# OpenSim document version 40000
Model P01_scaled:
  gravity: 0 -9.80665 0
  length_units: meters
  force_units: N
  Ground
  BodySet:
    Body pelvis: mass=9.630998 [kg] mass_center=(-0.06352247 0 0) inertia=(0.06534986 0.06534986 0.04323495 0 0 0)
        meshes=(r_pelvis.vtp l_pelvis.vtp sacrum.vtp)
      WrapCylinder Gmax1_at_pelvis_r: xyz_body_rotation=(-0.6 0.45 0) translation=(-0.0691829 -0.0600611 0.0519084)
          quadrant=all radius=0.033 length=0.1358022
      WrapCylinder Gmax2_at_pelvis_r: xyz_body_rotation=(-0.75 0.39 0) translation=(-0.0718783 -0.0743509 0.0578651)
          quadrant=all radius=0.025 length=0.09267366
      WrapCylinder Gmax3_at_pelvis_r: xyz_body_rotation=(-0.1 0 0) translation=(-0.07457376 -0.08943231 0.05786513)
          quadrant=all radius=0.03826481 length=0.08527636
      WrapCylinder Gmax1_at_pelvis_l: xyz_body_rotation=(0.6 -0.45 0) translation=(-0.06918289 -0.1006113 -0.05190842)
          quadrant=-x radius=0.033 length=0.1358022
      WrapCylinder Gmax2_at_pelvis_l: xyz_body_rotation=(0.75 -0.39 0) translation=(-0.0718783 -0.0743509 -0.0578651)
          quadrant=all radius=0.025 length=0.09267366
      WrapCylinder Gmax3_at_pelvis_l: xyz_body_rotation=(0.1 0 0) translation=(-0.07457376 -0.08943231 -0.05786513)
          quadrant=all radius=0.03826481 length=0.08527636
      WrapCylinder PS_at_brim_r: xyz_body_rotation=(-0.25 -0.27 0.1) translation=(-0.06648745 -0.06097657 0.05582283)
          quadrant=-y radius=0.04758074 length=0.08646352
      WrapCylinder PS_at_brim_l: xyz_body_rotation=(0.25 0.27 0.1) translation=(-0.06648745 -0.06097657 -0.05582283)
          quadrant=-y radius=0.04758074 length=0.08646352
      WrapCylinder IL_at_brim_r: xyz_body_rotation=(-0.32 -0.24 0.9) translation=(-0.06379201 -0.06605796 0.06433241)
          quadrant=-y radius=0.05216224 length=0.08704286
      WrapCylinder IL_at_brim_l: xyz_body_rotation=(0.32 0.24 0.9) translation=(-0.06379201 -0.06605796 -0.06433241)
          quadrant=-y radius=0.05216224 length=0.08704286
    Body femur_r: mass=3.364451 mass_center=(0 -0.1190788 0) inertia=(0.02376391 0.006229374 0.02505948 0 0 0)
        meshes=rightNSA135.2_rightAVA52.3_femurR_rotated.vtp
      WrapCylinder Gastroc_at_condyles_r: translation=(0.003502319 -0.2871901 0) quadrant=all radius=0.01751159
          length=0.07004638
      WrapCylinder KnExt_at_fem_r: xyz_body_rotation=(-0.062337 0.05076 0)
          translation=(0.002513474 -0.2820978 0.00146474) quadrant=all radius=0.01751159 length=0.07004638
      WrapCylinder AB_at_femshaft_r: xyz_body_rotation=(1.6616 0.18664 0)
          translation=(0.002486927 -0.08234652 0.007880217) quadrant=all radius=0.01155765 length=0.04903246
      WrapCylinder AL_at_femshaft_r: xyz_body_rotation=(1.7771 0.13649 0)
          translation=(0.01375711 -0.1659189 0.002100271) quadrant=all radius=0.01407932 length=0.07004638
      WrapCylinder AMprox_at_femshaft_r: xyz_body_rotation=(1.6113 0.18656 0)
          translation=(-0.004139811 -0.05453671 0.009307763) quadrant=all radius=0.01477979 length=0.04903246
      WrapCylinder AMmid_at_femshaft_r: xyz_body_rotation=(1.6114 0.13656 0)
          translation=(0.008348828 -0.1160458 0.005932158) quadrant=all radius=0.01498992 length=0.08405565
      WrapCylinder AMdist_at_femshaft_r: xyz_body_rotation=(1.7119 0.18664 0)
          translation=(0.01436861 -0.1861132 -0.001926766) quadrant=all radius=0.01527011 length=0.1400928
      WrapCylinder AMisch_at_condyles_r: xyz_body_rotation=(1.7111 -0.46336 0)
          translation=(-0.0158662 -0.2639558 -0.002209543) quadrant=all radius=0.02801855 length=0.1681113
      WrapCylinder PECT_at_femshaft_r: xyz_body_rotation=(1.813 0.27634 0)
          translation=(-0.003507432 -0.06266769 0.012836) quadrant=all radius=0.01050696 length=0.03502319
    Body femoral_cond_r: mass=0 mass_center=(0 0 0) inertia=(0 0 0 0 0 0) meshes=fem_cond.vtp
    Body sagittal_articulation_frame_r: mass=0 mass_center=(0 0 0) inertia=(0 0 0 0 0 0)
    Body med_cond_r: mass=3.617145e-8 mass_center=(0 0 0) inertia=(1.77475e-8 1.77475e-8 1.77475e-8 0 0 0)
        meshes=sphere.vtp
    Body lat_cond_r: mass=3.617145e-8 mass_center=(0 0 0) inertia=(1.77475e-8 1.77475e-8 1.77475e-8 0 0 0)
        meshes=sphere.vtp
    Body tibial_plat_r: mass=0 mass_center=(0 0 0) inertia=(0 0 0 0 0 0) meshes=tib_plat.vtp
    Body tibia_r: mass=2.12589 mass_center=(0 -0.1524853 0) inertia=(0.01927779 0.001950728 0.01954553 0 0 0)
        meshes=(rightTT9.11_tibiaR_rotated.vtp r_fibula.vtp)
      WrapCylinder GasLat_at_shank_r: xyz_body_rotation=(2.9672 -0.27973 -1.4781)
          translation=(-0.006043872 -0.06043872 -0.00269524) quadrant=-y radius=0.04492067 length=0.08167395
      WrapCylinder GasMed_at_shank_r: xyz_body_rotation=(2.9672 0.027973 -1.4781)
          translation=(-0.006043872 -0.06043872 -0.00269524) quadrant=-y radius=0.04492067 length=0.08167395
      WrapCylinder GR_at_condyles_r: xyz_body_rotation=(0 -0.4 0) translation=(-0.002450218 -0.01633479 0) quadrant=all
          radius=0.02940262 length=0.08167395
      WrapCylinder SM_at_condyles_r: xyz_body_rotation=(0 -0.1 0) translation=(-0.0008167395 -0.01633479 0)
          quadrant=all radius=0.02874923 length=0.08167395
      WrapCylinder ST_at_condyles_r: xyz_body_rotation=(0 -0.2 0) translation=(-0.001633479 -0.01674316 0) quadrant=all
          radius=0.03471143 length=0.08167395
      WrapCylinder BF_at_gastroc_r: translation=(-0.04737089 -0.04900437 0) quadrant=y radius=0.02450218
          length=0.1225109
    Body patella_r: mass=0.03117979 mass_center=(0.001260835 0.01849224 0)
        inertia=(5.093534e-7 2.326698e-6 2.326698e-6 0 0 0) meshes=r_patella.vtp
    Body talus_r: mass=0.04136435 mass_center=(0 0 0) inertia=(0.0002219411 0.0002219411 0.0002219411 0 0 0)
        meshes=r_talus.vtp
    Body calcn_r: mass=0.5170544 mass_center=(0.07324969 0.02197491 0)
        inertia=(0.0003107176 0.0008655704 0.0009099587 0 0 0) meshes=r_foot.vtp
    Body toes_r: mass=0.08959519 mass_center=(0.02534439 0.004394981 -0.0128187)
        inertia=(2.219411e-5 4.438823e-5 0.0002219411 0 0 0) meshes=r_bofoot.vtp
    Body femur_l: mass=3.547538 mass_center=(0 -0.1212008 0) inertia=(0.02595808 0.006804546 0.02737327 0 0 0)
        meshes=leftNSA128.9_leftAVA42.2_femurL_rotated.vtp
      WrapCylinder Gastroc_at_condyles_l: translation=(0.00356473 -0.2923079 0) quadrant=all radius=0.01782365
          length=0.0712946
      WrapCylinder KnExt_at_fem_l: xyz_body_rotation=(0.062337 -0.05076 0)
          translation=(0.002558264 -0.2871247 -0.001490841) quadrant=all radius=0.01782365 length=0.0712946
      WrapCylinder AB_at_femshaft_l: xyz_body_rotation=(-1.6616 -0.18664 0)
          translation=(0.003074009 -0.08213138 -0.01250935) quadrant=all radius=0.01176361 length=0.04990622
      WrapCylinder AL_at_femshaft_l: xyz_body_rotation=(-1.7771 -0.13649 0)
          translation=(0.01454481 -0.167193 -0.006626833) quadrant=all radius=0.01433021 length=0.0712946
      WrapCylinder AMprox_at_femshaft_l: xyz_body_rotation=(-1.6113 -0.18656 0)
          translation=(-0.003670816 -0.05382528 -0.01396233) quadrant=all radius=0.01504316 length=0.04990622
      WrapCylinder AMmid_at_femshaft_l: xyz_body_rotation=(-1.6114 -0.13656 0)
          translation=(0.009040868 -0.1164312 -0.01052736) quadrant=all radius=0.01525704 length=0.08555352
      WrapCylinder AMdist_at_femshaft_l: xyz_body_rotation=(-1.7119 -0.18664 0)
          translation=(0.01516793 -0.1877472 -0.002528035) quadrant=all radius=0.01554222 length=0.1425892
      WrapCylinder AMisch_at_condyles_l: xyz_body_rotation=(-1.7111 0.46336 0)
          translation=(-0.01614894 -0.2686594 0.002248917) quadrant=all radius=0.02851784 length=0.171107
      WrapCylinder PECT_at_femshaft_l: xyz_body_rotation=(-1.813 -0.27634 0)
          translation=(-0.003027169 -0.06210116 -0.01755416) quadrant=all radius=0.01069419 length=0.0356473
    Body femoral_cond_l: mass=0 mass_center=(0 0 0) inertia=(0 0 0 0 0 0) meshes=fem_cond.vtp
    Body sagittal_articulation_frame_l: mass=0 mass_center=(0 0 0) inertia=(0 0 0 0 0 0)
    Body med_cond_l: mass=0 mass_center=(0 0 0) inertia=(0 0 0 0 0 0) meshes=sphere.vtp
    Body lat_cond_l: mass=3.813983e-8 mass_center=(0 0 0) inertia=(1.938617e-8 1.938617e-8 1.938617e-8 0 0 0)
        meshes=sphere.vtp
    Body tibial_plat_l: mass=0 mass_center=(0 0 0) inertia=(0 0 0 0 0 0) meshes=tib_plat.vtp
    Body tibia_l: mass=2.365091 mass_center=(0 -0.1580024 0) inertia=(0.02302691 0.002330104 0.02334673 0 0 0)
        meshes=(leftTT7.58_tibiaL_rotated.vtp l_fibula.vtp)
      WrapCylinder GasLat_at_shank_l: xyz_body_rotation=(-2.9672 0.27973 -1.4781)
          translation=(-0.006262546 -0.06262546 0.002792757) quadrant=-y radius=0.04654595 length=0.08462901
      WrapCylinder GasMed_at_shank_l: xyz_body_rotation=(-2.9672 -0.027973 -1.4781)
          translation=(-0.006262546 -0.06262546 0.002792757) quadrant=-y radius=0.04654595 length=0.08462901
      WrapCylinder GR_at_condyles_l: xyz_body_rotation=(0 0.4 0) translation=(-0.00253887 -0.0169258 0) quadrant=all
          radius=0.03046644 length=0.08462901
      WrapCylinder SM_at_condyles_l: xyz_body_rotation=(0 0.1 0) translation=(-0.0008462901 -0.0169258 0) quadrant=all
          radius=0.02978941 length=0.08462901
      WrapCylinder ST_at_condyles_l: xyz_body_rotation=(0 0.2 0) translation=(-0.00169258 -0.01734895 0) quadrant=all
          radius=0.03596733 length=0.08462901
      WrapCylinder BF_at_gastroc_l: translation=(-0.04908482 -0.0507774 0) quadrant=all radius=0.0253887
          length=0.1269435
    Body patella_l: mass=0.03287654 mass_center=(0.001283303 0.01882177 0)
        inertia=(5.563831e-7 2.541527e-6 2.541527e-6 0 0 0) meshes=l_patella.vtp
    Body talus_l: mass=0.03271779 mass_center=(0 0 0) inertia=(0.0001501415 0.0001501415 0.0001501415 0 0 0)
        meshes=l_talus.vtp
    Body calcn_l: mass=0.4089724 mass_center=(0.06774206 0.02032262 0)
        inertia=(0.0002101981 0.0005855519 0.0006155802 0 0 0) meshes=l_foot.vtp
    Body toes_l: mass=0.07086674 mass_center=(0.02343875 0.004064523 0.01185486)
        inertia=(1.501415e-5 3.00283e-5 0.0001501415 0 0 0) meshes=l_bofoot.vtp
    Body torso: mass=10.6414 mass_center=(-0.02861439 0.2130998 -0.009278022)
        inertia=(0.2032448 0.104138 0.1973039 0 0 0) meshes=(hat_spine.vtp hat_jaw.vtp hat_skull.vtp hat_ribs_scap.vtp)
  JointSet:
    CustomJoint ground_pelvis: socket_parent_frame=ground_offset socket_child_frame=pelvis_offset
      Coordinate pelvis_tilt: default_value=0 range=(-1.570796 1.570796) clamped=true
      Coordinate pelvis_list: default_value=0 range=(-1.570796 1.570796) clamped=true
      Coordinate pelvis_rotation: default_value=0 range=(-3.140796 3.14708) clamped=true
      Coordinate pelvis_tx: default_value=0 range=(-5 5) clamped=true
      Coordinate pelvis_ty: default_value=0.93 range=(-1 2) clamped=true
      Coordinate pelvis_tz: default_value=0 range=(-3 3) clamped=true
      PhysicalOffsetFrame ground_offset: socket_parent=/ground translation=(0 0 0) [meters]
      PhysicalOffsetFrame pelvis_offset: socket_parent=/bodyset/pelvis translation=(0 0 0)
      SpatialTransform:
        TransformAxis rotation1: coordinates=pelvis_tilt axis=(0 0 1) LinearFunction(coefficients=1 0)
        TransformAxis rotation2: coordinates=pelvis_list axis=(1 0 0) LinearFunction(coefficients=1 0)
        TransformAxis rotation3: coordinates=pelvis_rotation axis=(0 1 0) LinearFunction(coefficients=1 0)
        TransformAxis translation1: coordinates=pelvis_tx axis=(1 0 0) LinearFunction(coefficients=1 0)
        TransformAxis translation2: coordinates=pelvis_ty axis=(0 1 0) LinearFunction(coefficients=1 0)
        TransformAxis translation3: coordinates=pelvis_tz axis=(0 0 1) LinearFunction(coefficients=1 0)
    CustomJoint hip_r: socket_parent_frame=pelvis_offset socket_child_frame=femur_r_offset
      Coordinate hip_flexion_r: default_value=0 range=(-0.5235988 2.094395) clamped=true
      Coordinate hip_adduction_r: default_value=0 range=(-0.8726646 0.5235988) clamped=true
      Coordinate hip_rotation_r: default_value=0 range=(-0.6981317 0.6981317) clamped=true
      PhysicalOffsetFrame pelvis_offset: socket_parent=/bodyset/pelvis translation=(-0.05056281 -0.07976752 0.065745)
      PhysicalOffsetFrame femur_r_offset: socket_parent=/bodyset/femur_r translation=(0 0 0)
      SpatialTransform: axes_held_at_zero=(translation1 translation2 translation3)
        TransformAxis rotation1: coordinates=hip_flexion_r axis=(0 0 1) LinearFunction(coefficients=1 0)
        TransformAxis rotation2: coordinates=hip_adduction_r axis=(1 0 0) LinearFunction(coefficients=1 0)
        TransformAxis rotation3: coordinates=hip_rotation_r axis=(0 1 0) LinearFunction(coefficients=1 0)
    CustomJoint Lerner_knee_r: socket_parent_frame=femoral_cond_r_offset
        socket_child_frame=sagittal_articulation_frame_r_offset
      Coordinate knee_angle_r: default_value=0 range=(-2.094395 0.1745329) clamped=true
      Coordinate knee_adduction_r: default_value=0 range=(-0.1745 0.1745) clamped=true
      PhysicalOffsetFrame femoral_cond_r_offset: socket_parent=/bodyset/femoral_cond_r translation=(0 0 0)
      PhysicalOffsetFrame sagittal_articulation_frame_r_offset: socket_parent=/bodyset/sagittal_articulation_frame_r
          translation=(0 0 0)
      SpatialTransform: axes_held_at_zero=(rotation2 translation3)
        TransformAxis rotation1: coordinates=knee_angle_r axis=(0 0 1) LinearFunction(coefficients=1 0)
        TransformAxis rotation3: coordinates=knee_adduction_r axis=(1 0 0) LinearFunction(coefficients=1 0)
        TransformAxis translation1: coordinates=knee_angle_r axis=(1 0 0)
          MultiplierFunction: scale=0.7004638
            SimmSpline: x=(-2.0944 -1.74533 -1.39626 -1.0472 -0.698132 -0.349066 -0.174533 0.197344 0.337395 0.490178 1.52146 2.0944)
                y=(-0.0032 0.00179 0.00411 0.0041 0.00212 -0.001 -0.0031 -0.005227 -0.005435 -0.005574 -0.005435 -0.00525)
        TransformAxis translation2: coordinates=knee_angle_r axis=(0 1 0)
          MultiplierFunction: scale=0.7004638
            SimmSpline: x=(-2.0944 -1.22173 -0.523599 -0.349066 -0.174533 0.159149 2.0944)
                y=(-0.0186 -0.0042 0.005 0.0064 0.0074 0.0087 0.008)
    CustomJoint med_cond_joint_r: socket_parent_frame=sagittal_articulation_frame_r_offset
        socket_child_frame=med_cond_r_offset
      Coordinate med_cond_adduction_r: default_value=0 range=(-2.094395 2.094395) clamped=true
          is_free_to_satisfy_constraints=true
      PhysicalOffsetFrame sagittal_articulation_frame_r_offset: socket_parent=/bodyset/sagittal_articulation_frame_r
          translation=(0 -0.02451623 -0.01400928)
      PhysicalOffsetFrame med_cond_r_offset: socket_parent=/bodyset/med_cond_r translation=(0 0 0)
      SpatialTransform: axes_held_at_zero=(rotation2 rotation3 translation1 translation2 translation3)
        TransformAxis rotation1: coordinates=med_cond_adduction_r axis=(1 0 0) LinearFunction(coefficients=1 0)
    CustomJoint lat_cond_joint_r: socket_parent_frame=sagittal_articulation_frame_r_offset
        socket_child_frame=lat_cond_r_offset
      Coordinate lat_cond_adduction_r: default_value=0 range=(-2.094395 2.094395) clamped=true
          is_free_to_satisfy_constraints=true
      PhysicalOffsetFrame sagittal_articulation_frame_r_offset: socket_parent=/bodyset/sagittal_articulation_frame_r
          translation=(0 -0.02451623 0.01400928)
      PhysicalOffsetFrame lat_cond_r_offset: socket_parent=/bodyset/lat_cond_r translation=(0 0 0)
      SpatialTransform: axes_held_at_zero=(rotation2 rotation3 translation1 translation2 translation3)
        TransformAxis rotation1: coordinates=lat_cond_adduction_r axis=(1 0 0) LinearFunction(coefficients=1 0)
    CustomJoint fem_pat_r: socket_parent_frame=femoral_cond_r_offset socket_child_frame=patella_r_offset
      Coordinate patella_r_constrained_knee_angle: default_value=0 range=(-999999.9 999999.9) clamped=true
      PhysicalOffsetFrame femoral_cond_r_offset: socket_parent=/bodyset/femoral_cond_r translation=(0 0 0.001681113)
      PhysicalOffsetFrame patella_r_offset: socket_parent=/bodyset/patella_r translation=(0 0 0)
      SpatialTransform: axes_held_at_zero=(rotation2 rotation3 translation3)
        TransformAxis rotation1: coordinates=patella_r_constrained_knee_angle axis=(0 0 1)
          SimmSpline: x=(-2.0944 -1.45752 -0.526391 0 0.0523599 0.174533)
              y=(-1.68636 -1.09112 -0.256161 -0.0012 -0.0187016 -0.1054)
        TransformAxis translation1: coordinates=patella_r_constrained_knee_angle axis=(1 0 0)
          MultiplierFunction: scale=0.7004638
            SimmSpline: x=(-2.0944 -1.91986 -1.5708 -1.39626 -1.0472 -0.698132 -0.349066 -0.174533 0 0.0872665 0.174533 2.0944)
                y=(-0.03082 -0.02767 -0.01694 -0.00996 0.00548 0.0215 0.03599 0.04069 0.0451 0.04648 0.04761 0.04648)
        TransformAxis translation2: coordinates=patella_r_constrained_knee_angle axis=(0 1 0)
          MultiplierFunction: scale=0.7004638
            SimmSpline: x=(-2.0944 -1.91986 -1.5708 -1.39626 -1.0472 -0.698132 -0.349066 -0.174533 0 0.0872665 0.174533 2.0944)
                y=(-0.02263 -0.02892 -0.0391 -0.0424 -0.0447 -0.0406 -0.0297 -0.023 -0.0145 -0.0098 -0.005 -0.0098)
    CustomJoint hip_l: socket_parent_frame=pelvis_offset socket_child_frame=femur_l_offset
      Coordinate hip_flexion_l: default_value=0 range=(-0.5235988 2.094395) clamped=true
      Coordinate hip_adduction_l: default_value=0 range=(-0.8726646 0.5235988) clamped=true
      Coordinate hip_rotation_l: default_value=0 range=(-0.6981317 0.6981317) clamped=true
      PhysicalOffsetFrame pelvis_offset: socket_parent=/bodyset/pelvis translation=(-0.05056281 -0.07976752 -0.065745)
      PhysicalOffsetFrame femur_l_offset: socket_parent=/bodyset/femur_l translation=(0 0 0)
      SpatialTransform: axes_held_at_zero=(translation1 translation2 translation3)
        TransformAxis rotation1: coordinates=hip_flexion_l axis=(0 0 1) LinearFunction(coefficients=1 0)
        TransformAxis rotation2: coordinates=hip_adduction_l axis=(1 0 0) LinearFunction(coefficients=-1 0)
        TransformAxis rotation3: coordinates=hip_rotation_l axis=(0 1 0) LinearFunction(coefficients=-1 0)
    CustomJoint Lerner_knee_l: socket_parent_frame=femoral_cond_l_offset
        socket_child_frame=sagittal_articulation_frame_l_offset
      Coordinate knee_angle_l: default_value=0 range=(-2.094395 0.1745329) clamped=true
      Coordinate knee_adduction_l: default_value=0 range=(-0.1745 0.1745) clamped=true
      PhysicalOffsetFrame femoral_cond_l_offset: socket_parent=/bodyset/femoral_cond_l translation=(0 0 0)
      PhysicalOffsetFrame sagittal_articulation_frame_l_offset: socket_parent=/bodyset/sagittal_articulation_frame_l
          translation=(0 0 0)
      SpatialTransform: axes_held_at_zero=(rotation2 translation3)
        TransformAxis rotation1: coordinates=knee_angle_l axis=(0 0 1) LinearFunction(coefficients=1 0)
        TransformAxis rotation3: coordinates=knee_adduction_l axis=(1 0 0) LinearFunction(coefficients=-1 0)
        TransformAxis translation1: coordinates=knee_angle_l axis=(1 0 0)
          MultiplierFunction: scale=0.712946
            SimmSpline: x=(-2.0944 -1.74533 -1.39626 -1.0472 -0.698132 -0.349066 -0.174533 0.197344 0.337395 0.490178 1.52146 2.0944)
                y=(-0.0032 0.00179 0.00411 0.0041 0.00212 -0.001 -0.0031 -0.005227 -0.005435 -0.005574 -0.005435 -0.00525)
        TransformAxis translation2: coordinates=knee_angle_l axis=(0 1 0)
          MultiplierFunction: scale=0.712946
            SimmSpline: x=(-2.0944 -1.22173 -0.523599 -0.349066 -0.174533 0.159149 2.0944)
                y=(-0.0186 -0.0042 0.005 0.0064 0.0074 0.0087 0.008)
    CustomJoint med_cond_joint_l: socket_parent_frame=sagittal_articulation_frame_l_offset
        socket_child_frame=med_cond_l_offset
      Coordinate med_cond_adduction_l: default_value=0 range=(-2.094395 2.094395) clamped=true
          is_free_to_satisfy_constraints=true
      PhysicalOffsetFrame sagittal_articulation_frame_l_offset: socket_parent=/bodyset/sagittal_articulation_frame_l
          translation=(0 -0.02495311 0.01425892)
      PhysicalOffsetFrame med_cond_l_offset: socket_parent=/bodyset/med_cond_l translation=(0 0 0)
      SpatialTransform: axes_held_at_zero=(rotation2 rotation3 translation1 translation2 translation3)
        TransformAxis rotation1: coordinates=med_cond_adduction_l axis=(1 0 0) LinearFunction(coefficients=1 0)
    CustomJoint lat_cond_joint_l: socket_parent_frame=sagittal_articulation_frame_l_offset
        socket_child_frame=lat_cond_l_offset
      Coordinate lat_cond_adduction_l: default_value=0 range=(-2.094395 2.094395) clamped=true
          is_free_to_satisfy_constraints=true
      PhysicalOffsetFrame sagittal_articulation_frame_l_offset: socket_parent=/bodyset/sagittal_articulation_frame_l
          translation=(0 -0.02495311 -0.01425892)
      PhysicalOffsetFrame lat_cond_l_offset: socket_parent=/bodyset/lat_cond_l translation=(0 0 0)
      SpatialTransform: axes_held_at_zero=(rotation2 rotation3 translation1 translation2 translation3)
        TransformAxis rotation1: coordinates=lat_cond_adduction_l axis=(1 0 0) LinearFunction(coefficients=1 0)
    CustomJoint fem_pat_l: socket_parent_frame=femoral_cond_l_offset socket_child_frame=patella_l_offset
      Coordinate patella_l_constrained_knee_angle: default_value=0 range=(-999999.9 999999.9) clamped=true
      PhysicalOffsetFrame femoral_cond_l_offset: socket_parent=/bodyset/femoral_cond_l translation=(0 0 -0.00171107)
      PhysicalOffsetFrame patella_l_offset: socket_parent=/bodyset/patella_l translation=(0 0 0)
      SpatialTransform: axes_held_at_zero=(rotation2 rotation3 translation3)
        TransformAxis rotation1: coordinates=patella_l_constrained_knee_angle axis=(0 0 1)
          SimmSpline: x=(-2.0944 -1.45752 -0.526391 0 0.0523599 0.174533)
              y=(-1.68636 -1.09112 -0.256161 -0.0012 -0.0187016 -0.1054)
        TransformAxis translation1: coordinates=patella_l_constrained_knee_angle axis=(1 0 0)
          MultiplierFunction: scale=0.712946
            SimmSpline: x=(-2.0944 -1.91986 -1.5708 -1.39626 -1.0472 -0.698132 -0.349066 -0.174533 0 0.0872665 0.174533 2.0944)
                y=(-0.03082 -0.02767 -0.01694 -0.00996 0.00548 0.0215 0.03599 0.04069 0.0451 0.04648 0.04761 0.04648)
        TransformAxis translation2: coordinates=patella_l_constrained_knee_angle axis=(0 1 0)
          MultiplierFunction: scale=0.712946
            SimmSpline: x=(-2.0944 -1.91986 -1.5708 -1.39626 -1.0472 -0.698132 -0.349066 -0.174533 0 0.0872665 0.174533 2.0944)
                y=(-0.02263 -0.02892 -0.0391 -0.0424 -0.0447 -0.0406 -0.0297 -0.023 -0.0145 -0.0098 -0.005 -0.0098)
    CustomJoint back: socket_parent_frame=pelvis_offset socket_child_frame=torso_offset
      Coordinate lumbar_extension: default_value=0 range=(-1.570796 1.570796) clamped=true
      Coordinate lumbar_bending: default_value=0 range=(-1.570796 1.570796) clamped=true
      Coordinate lumbar_rotation: default_value=0 range=(-1.570796 1.570796) clamped=true
      PhysicalOffsetFrame pelvis_offset: socket_parent=/bodyset/pelvis translation=(-0.09047684 0.08282651 0)
      PhysicalOffsetFrame torso_offset: socket_parent=/bodyset/torso translation=(0 0 0)
      SpatialTransform: axes_held_at_zero=(translation1 translation2 translation3)
        TransformAxis rotation1: coordinates=lumbar_extension axis=(0 0 1) LinearFunction(coefficients=1 0)
        TransformAxis rotation2: coordinates=lumbar_bending axis=(1 0 0) LinearFunction(coefficients=1 0)
        TransformAxis rotation3: coordinates=lumbar_rotation axis=(0 1 0) LinearFunction(coefficients=1 0)
    WeldJoint femur_weld_r: socket_parent_frame=femur_r_offset socket_child_frame=femoral_cond_r_offset
      PhysicalOffsetFrame femur_r_offset: socket_parent=/bodyset/femur_r translation=(0 -0.2829874 0)
      PhysicalOffsetFrame femoral_cond_r_offset: socket_parent=/bodyset/femoral_cond_r translation=(0 0 0)
    WeldJoint med_cond_weld_r: socket_parent_frame=med_cond_r_offset socket_child_frame=tibial_plat_r_offset
      PhysicalOffsetFrame med_cond_r_offset: socket_parent=/bodyset/med_cond_r translation=(0 0.02451623 0.01400928)
      PhysicalOffsetFrame tibial_plat_r_offset: socket_parent=/bodyset/tibial_plat_r translation=(0 0 0)
    WeldJoint tibial_plat_weld_r: socket_parent_frame=tibial_plat_r_offset socket_child_frame=tibia_r_offset
      PhysicalOffsetFrame tibial_plat_r_offset: socket_parent=/bodyset/tibial_plat_r translation=(0 0 0)
      PhysicalOffsetFrame tibia_r_offset: socket_parent=/bodyset/tibia_r translation=(0 0 0)
    WeldJoint femur_weld_l: socket_parent_frame=femur_l_offset socket_child_frame=femoral_cond_l_offset
      PhysicalOffsetFrame femur_l_offset: socket_parent=/bodyset/femur_l translation=(0 -0.2880302 0)
      PhysicalOffsetFrame femoral_cond_l_offset: socket_parent=/bodyset/femoral_cond_l translation=(0 0 0)
    WeldJoint med_cond_weld_l: socket_parent_frame=med_cond_l_offset socket_child_frame=tibial_plat_l_offset
      PhysicalOffsetFrame med_cond_l_offset: socket_parent=/bodyset/med_cond_l translation=(0 0.02495311 -0.01425892)
      PhysicalOffsetFrame tibial_plat_l_offset: socket_parent=/bodyset/tibial_plat_l translation=(0 0 0)
    WeldJoint tibial_plat_weld_l: socket_parent_frame=tibial_plat_l_offset socket_child_frame=tibia_l_offset
      PhysicalOffsetFrame tibial_plat_l_offset: socket_parent=/bodyset/tibial_plat_l translation=(0 0 0)
      PhysicalOffsetFrame tibia_l_offset: socket_parent=/bodyset/tibia_l translation=(0 0 0)
    PinJoint ankle_r: socket_parent_frame=tibia_r_offset socket_child_frame=talus_r_offset
      Coordinate ankle_angle_r: default_value=0 range=(-0.6981317 0.5235988) clamped=true
      PhysicalOffsetFrame tibia_r_offset: socket_parent=/bodyset/tibia_r translation=(-0.008167395 -0.3266958 0)
          orientation=(0.175895 -0.105208 0.0186622) [radians]
      PhysicalOffsetFrame talus_r_offset: socket_parent=/bodyset/talus_r translation=(0 0 0)
          orientation=(0.17589 0.053791 0.018662)
    PinJoint subtalar_r: socket_parent_frame=talus_r_offset socket_child_frame=calcn_r_offset
      Coordinate subtalar_angle_r: default_value=0 range=(-0.3490659 0.3490659) clamped=true
      PhysicalOffsetFrame talus_r_offset: socket_parent=/bodyset/talus_r
          translation=(-0.03572387 -0.03072824 0.005801375) orientation=(-1.76819 0.906223 1.8196)
      PhysicalOffsetFrame calcn_r_offset: socket_parent=/bodyset/calcn_r translation=(0 0 0)
          orientation=(-1.76819 0.906223 1.8196)
    PinJoint mtp_r: socket_parent_frame=calcn_r_offset socket_child_frame=toes_r_offset
      Coordinate mtp_angle_r: default_value=0 range=(-0.5235988 0.5235988) clamped=true locked=true
      PhysicalOffsetFrame calcn_r_offset: socket_parent=/bodyset/calcn_r
          translation=(0.1309704 -0.001464994 0.0007910966) orientation=(-3.14159 0.619901 0)
      PhysicalOffsetFrame toes_r_offset: socket_parent=/bodyset/toes_r translation=(0 0 0)
          orientation=(-3.14159 0.619901 0)
    PinJoint ankle_l: socket_parent_frame=tibia_l_offset socket_child_frame=talus_l_offset
      Coordinate ankle_angle_l: default_value=0 range=(-0.6981317 0.5235988) clamped=true
      PhysicalOffsetFrame tibia_l_offset: socket_parent=/bodyset/tibia_l translation=(-0.008462901 -0.338516 0)
          orientation=(-0.175895 0.105208 0.0186622)
      PhysicalOffsetFrame talus_l_offset: socket_parent=/bodyset/talus_l translation=(0 0 0)
          orientation=(-0.17589 -0.027088 0.018662)
    PinJoint subtalar_l: socket_parent_frame=talus_l_offset socket_child_frame=calcn_l_offset
      Coordinate subtalar_angle_l: default_value=0 range=(-0.3490659 0.3490659) clamped=true
      PhysicalOffsetFrame talus_l_offset: socket_parent=/bodyset/talus_l
          translation=(-0.0330378 -0.02841779 -0.005365171) orientation=(1.76819 -0.906223 1.8196)
      PhysicalOffsetFrame calcn_l_offset: socket_parent=/bodyset/calcn_l translation=(0 0 0)
          orientation=(1.76819 -0.906223 1.8196)
    PinJoint mtp_l: socket_parent_frame=calcn_l_offset socket_child_frame=toes_l_offset
      Coordinate mtp_angle_l: default_value=0 range=(-0.5235988 0.5235988) clamped=true locked=true
      PhysicalOffsetFrame calcn_l_offset: socket_parent=/bodyset/calcn_l
          translation=(0.1211228 -0.001354841 -0.0007316142) orientation=(-3.14159 -0.619901 0)
      PhysicalOffsetFrame toes_l_offset: socket_parent=/bodyset/toes_l translation=(0 0 0)
          orientation=(-3.14159 -0.619901 0)
  ConstraintSet:
    WeldConstraint Lat_Cond_r_Constraint: socket_frame1=lat_cond_r_offset socket_frame2=/bodyset/tibial_plat_r
      PhysicalOffsetFrame lat_cond_r_offset: socket_parent=/bodyset/lat_cond_r translation=(0 0.02451623 -0.01400928)
    WeldConstraint Lat_Cond_l_Constraint: socket_frame1=lat_cond_l_offset socket_frame2=/bodyset/tibial_plat_l
      PhysicalOffsetFrame lat_cond_l_offset: socket_parent=/bodyset/lat_cond_l translation=(0 0.02495311 0.01425892)
    CoordinateCouplerConstraint: independent_coordinate_names=knee_angle_r
        dependent_coordinate_name=patella_r_constrained_knee_angle scale_factor=1
      coupled_coordinates_function: SimmSpline: x=(-2.0944 -1.45752 -0.526391 0 0.0523599 0.174533)
          y=(-2.0944 -1.45752 -0.526391 0 0.0523599 0.174533)
    CoordinateCouplerConstraint coordinatecouplerconstraint_0: independent_coordinate_names=knee_angle_l
        dependent_coordinate_name=patella_l_constrained_knee_angle scale_factor=1
      coupled_coordinates_function: SimmSpline: x=(-2.0944 -1.99997 -1.45752 -0.526391 0.0279253 0.174533)
          y=(-2.0944 -1.99997 -1.45752 -0.526391 0.0279253 0.174533)
  ForceSet:
    Millard2012EquilibriumMuscle [values shared by the 80 below unless stated]: fiber_damping=0.01
        default_activation=0.01 minimum_activation=0.01
      ActiveForceLengthCurve: min_norm_active_fiber_length=0.25 transition_norm_fiber_length=0.77
          max_norm_active_fiber_length=1.9 shallow_ascending_slope=0.75 minimum_value=0
      ForceVelocityCurve: concentric_slope_at_vmax=0 concentric_slope_near_vmax=0.25 isometric_slope=5
          eccentric_slope_at_vmax=0 eccentric_slope_near_vmax=0.15 max_eccentric_velocity_force_multiplier=1.4
      TendonForceLengthCurve
    Millard2012EquilibriumMuscle addbrev_r: max_isometric_force=625.8197 optimal_fiber_length=0.07545747
        tendon_slack_length=0.02594558 pennation_angle_at_optimal=0.1147809 [radians]
      PathPoint P1: pelvis (-0.01716095 -0.09552997 0.01310475)
      PathPoint P2: femur_r (-0.006315381 -0.08575778 0.006818384)
      PathWrap: wrap_object=AB_at_femshaft_r method=hybrid
      FiberForceLengthCurve: strain_at_zero_force=-0.1927643 strain_at_one_norm_force=0.5015522
          stiffness_at_low_force=0.2 stiffness_at_one_norm_force=2.880531 curviness=0.75
    Millard2012EquilibriumMuscle addlong_r: max_isometric_force=916.8 optimal_fiber_length=0.0764223
        tendon_slack_length=0.09309067 pennation_angle_at_optimal=0.1377704
      PathPoint P1: pelvis (-0.006810471 -0.09034696 0.01606608)
      PathPoint P2: femur_r (0.005471463 -0.169218 0.005825547)
      PathWrap: wrap_object=AL_at_femshaft_r method=hybrid
      FiberForceLengthCurve: strain_at_zero_force=-0.1917374 strain_at_one_norm_force=0.5002995
          stiffness_at_low_force=0.2 stiffness_at_one_norm_force=2.890019 curviness=0.75
    Millard2012EquilibriumMuscle addmagDist_r: max_isometric_force=597.2951 optimal_fiber_length=0.1138128
        tendon_slack_length=0.05612326 pennation_angle_at_optimal=0.194705
      PathPoint P1: pelvis (-0.06652339 -0.129748 0.03388514)
      PathPoint P2: femur_r (0.005867995 -0.1851606 0.009135449)
      PathWrap: wrap_object=AMdist_at_femshaft_r method=hybrid
      FiberForceLengthCurve: strain_at_zero_force=-3.981963e-9 strain_at_one_norm_force=0.7 stiffness_at_low_force=0.2
          stiffness_at_one_norm_force=2.857143 curviness=0.75
    Millard2012EquilibriumMuscle addmagIsch_r: max_isometric_force=597.2951 optimal_fiber_length=0.1024539
        tendon_slack_length=0.1419026 pennation_angle_at_optimal=0.1680443
      PathPoint P1: pelvis (-0.0805217 -0.131872 0.03549345)
      PathPoint P2: femur_r (0.003369231 -0.2717589 -0.02292618)
      PathWrap: wrap_object=AMisch_at_condyles_r method=hybrid
      FiberForceLengthCurve: strain_at_zero_force=0.007389956 strain_at_one_norm_force=0.7000392
          stiffness_at_low_force=0.2 stiffness_at_one_norm_force=2.887464 curviness=0.75
    Millard2012EquilibriumMuscle addmagMid_r: max_isometric_force=597.2951 optimal_fiber_length=0.08921853
        tendon_slack_length=0.030211 pennation_angle_at_optimal=0.2073076
      PathPoint P1: pelvis (-0.04731391 -0.1227154 0.02428633)
      PathPoint P2: femur_r (-0.002146571 -0.1162139 0.01209841)
      PathWrap: wrap_object=AMmid_at_femshaft_r method=hybrid
      FiberForceLengthCurve: strain_at_zero_force=-3.981963e-9 strain_at_one_norm_force=0.7 stiffness_at_low_force=0.2
          stiffness_at_one_norm_force=2.857143 curviness=0.75
    Millard2012EquilibriumMuscle addmagProx_r: max_isometric_force=597.2951 optimal_fiber_length=0.07964917
        tendon_slack_length=0.03041459 pennation_angle_at_optimal=0.3114833
      PathPoint P1: pelvis (-0.02783488 -0.1093005 0.01161557)
      PathPoint P2: femur_r (-0.01694842 -0.05817001 0.007925047)
      PathWrap: wrap_object=AMprox_at_femshaft_r method=hybrid
      FiberForceLengthCurve: strain_at_zero_force=-3.981963e-9 strain_at_one_norm_force=0.7 stiffness_at_low_force=0.2
          stiffness_at_one_norm_force=2.857143 curviness=0.75
    Millard2012EquilibriumMuscle bflh_r: max_isometric_force=1313.184 optimal_fiber_length=0.06684836
        tendon_slack_length=0.2227548 pennation_angle_at_optimal=0.1759182
      PathPoint P1: pelvis (-0.09344182 -0.1210385 0.04986613)
      PathPoint P2: tibia_r (-0.02752412 -0.02858588 0.02066351)
      PathPoint P3: tibia_r (-0.02344042 -0.03716165 0.02474721)
      FiberForceLengthCurve: strain_at_zero_force=0.1965607 strain_at_one_norm_force=0.7068715
          stiffness_at_low_force=0.2 stiffness_at_one_norm_force=3.91918 curviness=0.75
    Millard2012EquilibriumMuscle bfsh_r: max_isometric_force=557.1148 optimal_fiber_length=0.0800182
        tendon_slack_length=0.07676612 pennation_angle_at_optimal=0.2642232
      PathPoint P1: femur_r (0.0005522877 -0.1497592 0.009964097)
      PathPoint P2: tibia_r (-0.02458386 -0.03422138 0.02597232)
      PathWrap: wrap_object=BF_at_gastroc_r method=hybrid
      FiberForceLengthCurve: strain_at_zero_force=0.115251 strain_at_one_norm_force=0.6888986
          stiffness_at_low_force=0.2 stiffness_at_one_norm_force=3.486462 curviness=0.75
    Millard2012EquilibriumMuscle edl_r: max_isometric_force=603.4982 optimal_fiber_length=0.05440361
        tendon_slack_length=0.2895836 pennation_angle_at_optimal=0.2182582
      PathPoint P1: tibia_r (-0.01306783 -0.09449676 0.01674316)
      PathPoint P2: tibia_r (0.01177738 -0.307094 0.01115258)
      PathPoint P3: calcn_r (0.06731646 0.02636989 0.0005859975)
      PathPoint P4: calcn_r (0.1183715 0.004028733 0.00952246)
      PathPoint P5: toes_r (0.0002197491 0.003442735 0.0112072)
      PathPoint P6: toes_r (0.03244961 -0.0002929988 0.01831242)
      FiberForceLengthCurve: strain_at_zero_force=0.1317998 strain_at_one_norm_force=0.7072192
          stiffness_at_low_force=0.2 stiffness_at_one_norm_force=3.475726 curviness=0.75
    Millard2012EquilibriumMuscle ehl_r: max_isometric_force=285.8675 optimal_fiber_length=0.05842371
        tendon_slack_length=0.2552485 pennation_angle_at_optimal=0.1972681
      PathPoint P1: tibia_r (-0.01186069 -0.1265946 0.01511131)
      PathPoint P2: tibia_r (0.003604925 -0.2375895 0.01414348)
      PathPoint P3: tibia_r (0.01649079 -0.3016219 0.0003282721)
      PathPoint P4: calcn_r (0.0710522 0.02849413 -0.01545568)
      PathPoint P5: calcn_r (0.09471185 0.02263415 -0.01882517)
      PathPoint P6: calcn_r (0.127015 0.01018171 -0.02050991)
      PathPoint P7: toes_r (0.02182841 0.003003237 -0.01794617)
      PathPoint P8: toes_r (0.04123957 0.002490489 -0.01362444)
      FiberForceLengthCurve: strain_at_zero_force=0.1051406 strain_at_one_norm_force=0.7178208
          stiffness_at_low_force=0.2 stiffness_at_one_norm_force=3.264346 curviness=0.75
    Millard2012EquilibriumMuscle fdl_r: max_isometric_force=423.177 optimal_fiber_length=0.03458854
        tendon_slack_length=0.2937488 pennation_angle_at_optimal=0.2248391
      PathPoint P1: tibia_r (-0.001787843 -0.1496267 -0.001579084)
      PathPoint P2: tibia_r (-0.01259004 -0.2977015 -0.01227559)
      PathPoint P3: calcn_r (0.03193686 0.02307365 -0.02050991)
      PathPoint P4: calcn_r (0.05186078 0.01289195 -0.01926467)
      PathPoint P5: calcn_r (0.121448 -0.005933225 0.008496964)
      PathPoint P6: toes_r (-0.001391744 -0.005713476 0.0107677)
      PathPoint P7: toes_r (0.02087616 -0.005200728 0.01574868)
      PathPoint P8: toes_r (0.03230311 -0.004394981 0.01772642)
      FiberForceLengthCurve: strain_at_zero_force=-0.01205975 strain_at_one_norm_force=0.6997089
          stiffness_at_low_force=0.2 stiffness_at_one_norm_force=2.809902 curviness=0.75
    Millard2012EquilibriumMuscle fhl_r: max_isometric_force=907.8393 optimal_fiber_length=0.04064484
        tendon_slack_length=0.2732842 pennation_angle_at_optimal=0.2580255
      PathPoint P1: tibia_r (-0.02685848 -0.1766607 0.01365588)
      PathPoint P2: tibia_r (-0.01853264 -0.2998251 -0.009258559)
      PathPoint P3: calcn_r (0.02739538 0.02021691 -0.01765317)
      PathPoint P4: calcn_r (0.07603318 0.004980979 -0.01875192)
      PathPoint P5: calcn_r (0.126429 -0.003882233 -0.01970417)
      PathPoint P6: toes_r (0.0113537 -0.00468798 -0.01941117)
      PathPoint P7: toes_r (0.04116633 -0.007471468 -0.01325819)
      FiberForceLengthCurve: strain_at_zero_force=0.01130745 strain_at_one_norm_force=0.7002505
          stiffness_at_low_force=0.2 stiffness_at_one_norm_force=2.902997 curviness=0.75
    Millard2012EquilibriumMuscle gaslat_r: max_isometric_force=1575.059 optimal_fiber_length=0.04777296
        tendon_slack_length=0.3055439 pennation_angle_at_optimal=0.2102268
      PathPoint P1: femur_r (-0.002101391 -0.2671569 0.01940285)
      PathPoint P2: calcn_r (0.003222986 0.0227074 -0.003882233)
      PathWrap: wrap_object=GasLat_at_shank_r method=hybrid
      PathWrap pathwrap_0: wrap_object=Gastroc_at_condyles_r method=hybrid
      FiberForceLengthCurve: strain_at_zero_force=-0.05983233 strain_at_one_norm_force=0.7435102
          stiffness_at_low_force=0.2 stiffness_at_one_norm_force=2.489598 curviness=0.75
    Millard2012EquilibriumMuscle gasmed_r: max_isometric_force=3115.515 optimal_fiber_length=0.04137656
        tendon_slack_length=0.3234806 pennation_angle_at_optimal=0.1656816
      PathPoint P1: femur_r (0.00560371 -0.2653357 -0.01456965)
      PathPoint P2: calcn_r (0.003222986 0.0227074 -0.003882233)
      PathWrap shank: wrap_object=GasMed_at_shank_r method=hybrid
      PathWrap condyles: wrap_object=Gastroc_at_condyles_r method=hybrid
      FiberForceLengthCurve: strain_at_zero_force=0.1998358 strain_at_one_norm_force=0.7902371
          stiffness_at_low_force=0.2 stiffness_at_one_norm_force=3.387526 curviness=0.75
    Millard2012EquilibriumMuscle glmax1_r: max_isometric_force=983.7836 optimal_fiber_length=0.1332105
        tendon_slack_length=0.0442593 pennation_angle_at_optimal=0.3540118
      PathPoint P1: pelvis (-0.1106028 0.03506153 0.04790892)
      PathPoint P2: pelvis (-0.1129388 -0.02459389 0.06628961)
      PathPoint P3: femur_r (-0.03410558 -0.02729077 -0.004630766)
      PathPoint P4: femur_r (-0.02974029 -0.04227089 0.009839415)
      PathWrap: wrap_object=Gmax1_at_pelvis_r method=hybrid
      FiberForceLengthCurve: strain_at_zero_force=-0.07534176 strain_at_one_norm_force=0.8468075
          stiffness_at_low_force=0.2 stiffness_at_one_norm_force=2.168846 curviness=0.75
    Millard2012EquilibriumMuscle glmax2_r: max_isometric_force=1406.046 optimal_fiber_length=0.1336817
        tendon_slack_length=0.05780426 pennation_angle_at_optimal=0.3673821
      PathPoint P1: pelvis (-0.1183297 0.008841603 0.03931425)
      PathPoint P2: pelvis (-0.1207556 -0.06189122 0.06918287)
      PathPoint P3: femur_r (-0.03170439 -0.04268066 -0.009103928)
      PathPoint P4: femur_r (-0.01768601 -0.07426317 0.01696453)
      PathWrap: wrap_object=Gmax2_at_pelvis_r method=hybrid
      FiberForceLengthCurve: strain_at_zero_force=0.199275 strain_at_one_norm_force=0.7164175
          stiffness_at_low_force=0.2 stiffness_at_one_norm_force=3.867406 curviness=0.75
    Millard2012EquilibriumMuscle glmax3_r: max_isometric_force=947.7541 optimal_fiber_length=0.1350259
        tendon_slack_length=0.05636855 pennation_angle_at_optimal=0.3824161
      PathPoint P1: pelvis (-0.1168023 -0.0533545 0.00765862)
      PathPoint P2: pelvis (-0.1143764 -0.1283557 0.03701666)
      PathPoint P3: femur_r (-0.02425286 -0.08184919 -0.004609402)
      PathPoint P4: femur_r (-0.01248437 -0.1025759 0.01626477)
      PathWrap: wrap_object=Gmax3_at_pelvis_r method=hybrid
      FiberForceLengthCurve: strain_at_zero_force=0.1989714 strain_at_one_norm_force=0.7121937
          stiffness_at_low_force=0.2 stiffness_at_one_norm_force=3.896947 curviness=0.75
    Millard2012EquilibriumMuscle glmed1_r: max_isometric_force=1093.467 optimal_fiber_length=0.07075965
        tendon_slack_length=0.05410383 pennation_angle_at_optimal=0.3165559
      PathPoint P1: pelvis (-0.04414893 0.02657893 0.09810554)
      PathPoint P2: femur_r (-0.02901251 -0.02172068 0.02557603)
      FiberForceLengthCurve: strain_at_zero_force=-3.729382e-9 strain_at_one_norm_force=0.7 stiffness_at_low_force=0.2
          stiffness_at_one_norm_force=2.857143 curviness=0.75
    Millard2012EquilibriumMuscle glmed2_r: max_isometric_force=765.0917 optimal_fiber_length=0.08083361
        tendon_slack_length=0.07225064 pennation_angle_at_optimal=0.3165559
      PathPoint P1: pelvis (-0.07612573 0.05552315 0.06976451)
      PathPoint P2: femur_r (-0.03331966 -0.01562384 0.02163663)
      FiberForceLengthCurve: strain_at_zero_force=0.06397124 strain_at_one_norm_force=0.7014005
          stiffness_at_low_force=0.2 stiffness_at_one_norm_force=3.137603 curviness=0.75
    Millard2012EquilibriumMuscle glmed3_r: max_isometric_force=871.1993 optimal_fiber_length=0.07392302
        tendon_slack_length=0.04580477 pennation_angle_at_optimal=0.3165559
      PathPoint P1: pelvis (-0.08972733 0.01581264 0.05437759)
      PathPoint P2: femur_r (-0.03726537 -0.01144067 0.01632291)
      FiberForceLengthCurve: strain_at_zero_force=0.1252157 strain_at_one_norm_force=0.7030514
          stiffness_at_low_force=0.2 stiffness_at_one_norm_force=3.461191 curviness=0.75
    Millard2012EquilibriumMuscle glmin1_r: max_isometric_force=374.0459 optimal_fiber_length=0.07422803
        tendon_slack_length=0.01761582 pennation_angle_at_optimal=0.1745329
      PathPoint P1: pelvis (-0.02657659 -0.000109978 0.1007998)
      PathPoint P2: femur_r (-0.01687417 -0.01914998 0.03182767)
      FiberForceLengthCurve: strain_at_zero_force=-3.729382e-9 strain_at_one_norm_force=0.7 stiffness_at_low_force=0.2
          stiffness_at_one_norm_force=2.857143 curviness=0.75
    Millard2012EquilibriumMuscle glmin2_r: max_isometric_force=394.8197 optimal_fiber_length=0.06461005
        tendon_slack_length=0.0301118 pennation_angle_at_optimal=0
      PathPoint P1: pelvis (-0.05534631 0.01016303 0.08607041)
      PathPoint P2: femur_r (-0.01723071 -0.0141914 0.02983135)
      FiberForceLengthCurve: strain_at_zero_force=0.003039474 strain_at_one_norm_force=0.7000285
          stiffness_at_low_force=0.2 stiffness_at_one_norm_force=2.869486 curviness=0.75
    Millard2012EquilibriumMuscle glmin3_r: max_isometric_force=446.7738 optimal_fiber_length=0.03235127
        tendon_slack_length=0.04331026 pennation_angle_at_optimal=0.01745329
      PathPoint P1: pelvis (-0.07089 -0.01575228 0.06790643)
      PathPoint P2: femur_r (-0.02160721 -0.00877541 0.02727606)
      FiberForceLengthCurve: strain_at_zero_force=0.007461173 strain_at_one_norm_force=0.7002322
          stiffness_at_low_force=0.2 stiffness_at_one_norm_force=2.886957 curviness=0.75
    Millard2012EquilibriumMuscle grac_r: max_isometric_force=281.3115 optimal_fiber_length=0.1566619
        tendon_slack_length=0.1182968 pennation_angle_at_optimal=0.1720016
      PathPoint P1: pelvis (-0.04255197 -0.1314248 0.02089952)
      PathPoint P2: tibia_r (-0.01504434 -0.03883596 -0.02418366)
      PathPoint P3: tibia_r (0.001453796 -0.0568614 -0.01284731)
      PathWrap: wrap_object=GR_at_condyles_r method=hybrid
      FiberForceLengthCurve: strain_at_zero_force=-0.1969779 strain_at_one_norm_force=0.8027483
          stiffness_at_low_force=0.2 stiffness_at_one_norm_force=2.000548 curviness=0.75
    Millard2012EquilibriumMuscle iliacus_r: max_isometric_force=1021.141 optimal_fiber_length=0.09311922
        tendon_slack_length=0.08396515 pennation_angle_at_optimal=0.279914
      PathPoint P1: pelvis (-0.05435798 0.03140294 0.07173574)
      PathPoint P2: pelvis (-0.01212947 -0.05660659 0.06433241)
      PathPoint P3: femur_r (-0.002302074 -0.04249784 0.0002833936)
      PathPoint P4: femur_r (-0.01082567 -0.04736746 9.782677e-5)
      PathWrap: wrap_object=IL_at_brim_r method=hybrid range=(2 3)
      FiberForceLengthCurve: strain_at_zero_force=-0.1703103 strain_at_one_norm_force=0.5005449
          stiffness_at_low_force=0.2 stiffness_at_one_norm_force=2.98127 curviness=0.75
    Millard2012EquilibriumMuscle perbrev_r: max_isometric_force=521.2016 optimal_fiber_length=0.03630996
        tendon_slack_length=0.1179894 pennation_angle_at_optimal=0.2052361
      PathPoint P1: tibia_r (-0.02261307 -0.2067984 0.01740145)
      PathPoint P2: tibia_r (-0.03055831 -0.3179567 0.01569692)
      PathPoint P3: tibia_r (-0.02628104 -0.3270225 0.01687874)
      PathPoint P4: calcn_r (0.0345006 0.01977742 0.01706718)
      PathPoint P5: calcn_r (0.04959004 0.01604168 0.02512464)
      FiberForceLengthCurve: strain_at_zero_force=-0.04234068 strain_at_one_norm_force=0.6987541
          stiffness_at_low_force=0.2 stiffness_at_one_norm_force=2.69871 curviness=0.75
    Millard2012EquilibriumMuscle perlong_r: max_isometric_force=1115.371 optimal_fiber_length=0.04017997
        tendon_slack_length=0.2627681 pennation_angle_at_optimal=0.2479525
      PathPoint P1: tibia_r (-0.01655939 -0.1121383 0.02287116)
      PathPoint P2: tibia_r (-0.02862917 -0.3185284 0.01501331)
      PathPoint P3: tibia_r (-0.02503878 -0.3278392 0.0158374)
      PathPoint P4: calcn_r (0.03208336 0.01684743 0.01618818)
      PathPoint P5: calcn_r (0.04988304 0.007764467 0.02080291)
      PathPoint P6: calcn_r (0.06240873 0.005054229 0.008643463)
      PathPoint P7: calcn_r (0.08811938 0.006226224 -0.01347794)
      FiberForceLengthCurve: strain_at_zero_force=-0.1323481 strain_at_one_norm_force=0.6924185
          stiffness_at_low_force=0.2 stiffness_at_one_norm_force=2.424929 curviness=0.75
    Millard2012EquilibriumMuscle piri_r: max_isometric_force=1029.787 optimal_fiber_length=0.02339041
        tendon_slack_length=0.1033732 pennation_angle_at_optimal=0.1745329
      PathPoint P1: pelvis (-0.09147415 -0.006636284 0.01149644)
      PathPoint P2: pelvis (-0.09166284 -0.03115903 0.05184035)
      PathPoint P3: femur_r (-0.02495332 -0.009301458 0.0182723)
      FiberForceLengthCurve: strain_at_zero_force=0.09922992 strain_at_one_norm_force=0.7028348
          stiffness_at_low_force=0.2 stiffness_at_one_norm_force=3.313426 curviness=0.75
    Millard2012EquilibriumMuscle psoas_r: max_isometric_force=1426.79 optimal_fiber_length=0.1065772
        tendon_slack_length=0.09075305 pennation_angle_at_optimal=0.2155251
      PathPoint P1: pelvis (-0.05444783 0.06300913 0.03318735)
      PathPoint P2: pelvis (-0.01841882 -0.06646447 0.05582283)
      PathPoint P3: femur_r (-0.004900024 -0.03270816 -0.008425879)
      PathPoint P4: femur_r (-0.01210612 -0.03884072 -0.0107255)
      PathWrap: wrap_object=PS_at_brim_r method=hybrid range=(2 3)
      FiberForceLengthCurve: strain_at_zero_force=-0.09543841 strain_at_one_norm_force=0.5010382
          stiffness_at_low_force=0.2 stiffness_at_one_norm_force=3.353023 curviness=0.75
    Millard2012EquilibriumMuscle recfem_r: max_isometric_force=2191.741 optimal_fiber_length=0.05581841
        tendon_slack_length=0.3298313 pennation_angle_at_optimal=0.2170149
      PathPoint P1: pelvis (-0.0215635 -0.03943152 0.07939436)
      PathPoint P2: patella_r (0.007004638 0.03432272 0.0004903246)
      PathPoint P3: patella_r (0.008475612 0.03061027 -0.0007004638)
      PathPoint P4: patella_r (0.003502319 0.001730146 2.101391e-5)
      PathPoint P5: tibia_r (0.02662571 -0.0515526 -0.0003838676)
      PathWrap: wrap_object=KnExt_at_fem_r method=hybrid
      FiberForceLengthCurve: strain_at_zero_force=0.1999726 strain_at_one_norm_force=0.8999622
          stiffness_at_low_force=0.2 stiffness_at_one_norm_force=2.857186 curviness=0.75
    Millard2012EquilibriumMuscle sart_r: max_isometric_force=249.4131 optimal_fiber_length=0.3058625
        tendon_slack_length=0.09411142 pennation_angle_at_optimal=0.02613542
      PathPoint P1: pelvis (-0.01752034 -0.01585391 0.08986114)
      PathPoint P2: femur_r (-0.002948182 -0.2504648 -0.03133455)
      PathPoint P3: tibia_r (-0.02050016 -0.03275125 -0.02981099)
      PathPoint P4: tibia_r (-0.01298616 -0.04892269 -0.02156192)
      PathPoint P5: tibia_r (0.01110766 -0.0661559 -0.002123523)
      FiberForceLengthCurve: strain_at_zero_force=-0.1984568 strain_at_one_norm_force=0.7212821
          stiffness_at_low_force=0.2 stiffness_at_one_norm_force=2.17453 curviness=0.75
    Millard2012EquilibriumMuscle semimem_r: max_isometric_force=2200.987 optimal_fiber_length=0.04727126
        tendon_slack_length=0.238128 pennation_angle_at_optimal=0.2545615
      PathPoint P1: pelvis (-0.08867989 -0.1158555 0.05224881)
      PathPoint P2: tibia_r (-0.02368544 -0.03405804 -0.01600809)
      PathWrap: wrap_object=SM_at_condyles_r method=hybrid
      FiberForceLengthCurve: strain_at_zero_force=0.1994426 strain_at_one_norm_force=0.7353994
          stiffness_at_low_force=0.2 stiffness_at_one_norm_force=3.731644 curviness=0.75
    Millard2012EquilibriumMuscle semiten_r: max_isometric_force=591.2951 optimal_fiber_length=0.1336763
        tendon_slack_length=0.1712157 pennation_angle_at_optimal=0.241295
      PathPoint P1: pelvis (-0.09326213 -0.1273394 0.04382433)
      PathPoint P2: tibia_r (-0.02548227 -0.04149037 -0.01870333)
      PathPoint P3: tibia_r (0.001551805 -0.06313396 -0.009555852)
      PathWrap: wrap_object=ST_at_condyles_r method=hybrid
      FiberForceLengthCurve: strain_at_zero_force=0.007279189 strain_at_one_norm_force=0.7803276
          stiffness_at_low_force=0.2 stiffness_at_one_norm_force=2.58716 curviness=0.75
    Millard2012EquilibriumMuscle soleus_r: max_isometric_force=6194.843 optimal_fiber_length=0.03575245
        tendon_slack_length=0.2248796 pennation_angle_at_optimal=0.3814289
      PathPoint P1: tibia_r (-0.00620722 -0.07481334 0.008004047)
      PathPoint P2: calcn_r (0.003222986 0.0227074 -0.003882233)
      FiberForceLengthCurve: strain_at_zero_force=0.1569032 strain_at_one_norm_force=0.8506533
          stiffness_at_low_force=0.2 stiffness_at_one_norm_force=2.882882 curviness=0.75
    Millard2012EquilibriumMuscle tfl_r: max_isometric_force=411.2066 optimal_fiber_length=0.07128236
        tendon_slack_length=0.3372759 pennation_angle_at_optimal=0.05235988
      PathPoint P1: pelvis (-0.01827487 0.01102797 0.1100268)
      PathPoint P2: femur_r (0.01151212 -0.07323349 0.03404464)
      PathPoint P3: femur_r (0.007494962 -0.2836878 0.02269503)
      PathPoint P4: tibia_r (0.008820786 -0.03348632 0.02825919)
      FiberForceLengthCurve: strain_at_zero_force=0.07118385 strain_at_one_norm_force=0.7197196
          stiffness_at_low_force=0.2 stiffness_at_one_norm_force=3.08387 curviness=0.75
    Millard2012EquilibriumMuscle tibant_r: max_isometric_force=1227.452 optimal_fiber_length=0.05473279
        tendon_slack_length=0.1926955 pennation_angle_at_optimal=0.1951828
      PathPoint P1: tibia_r (0.01257779 -0.1071562 0.01323118)
      PathPoint P2: tibia_r (0.01971037 -0.1556705 0.01187621)
      PathPoint P3: tibia_r (0.02049689 -0.298845 -0.00763194)
      PathPoint P4: calcn_r (0.08540914 0.01303844 -0.02234116)
      FiberForceLengthCurve: strain_at_zero_force=0.1892237 strain_at_one_norm_force=0.7076768
          stiffness_at_low_force=0.2 stiffness_at_one_norm_force=3.85763 curviness=0.75
    Millard2012EquilibriumMuscle tibpost_r: max_isometric_force=1730.154 optimal_fiber_length=0.03039177
        tendon_slack_length=0.2257511 pennation_angle_at_optimal=0.2264891
      PathPoint P1: tibia_r (-0.003348632 -0.1065028 0.008412417)
      PathPoint P2: tibia_r (-0.01096228 -0.2985183 -0.01623351)
      PathPoint P3: calcn_r (0.03054512 0.0244654 -0.02094941)
      PathPoint P4: calcn_r (0.05654876 0.0116467 -0.02058316)
      FiberForceLengthCurve: strain_at_zero_force=-0.1916705 strain_at_one_norm_force=0.6862359
          stiffness_at_low_force=0.2 stiffness_at_one_norm_force=2.278147 curviness=0.75
    Millard2012EquilibriumMuscle vasint_r: max_isometric_force=1697.361 optimal_fiber_length=0.07152119
        tendon_slack_length=0.145643 pennation_angle_at_optimal=0.06309973
      PathPoint P1: femur_r (0.01700586 -0.1368846 0.01450871)
      PathPoint P2: femur_r (0.02044444 -0.1479099 0.01338166)
      PathPoint P3: patella_r (0.00406269 0.03362226 -0.0004202783)
      PathPoint P4: patella_r (0.003502319 0.001730146 -0.0002731809)
      PathPoint P5: tibia_r (0.0266012 -0.05161794 0.000351198)
      PathWrap: wrap_object=KnExt_at_fem_r method=hybrid
      FiberForceLengthCurve: strain_at_zero_force=0.1999153 strain_at_one_norm_force=0.8514363
          stiffness_at_low_force=0.2 stiffness_at_one_norm_force=3.06974 curviness=0.75
    Millard2012EquilibriumMuscle vaslat_r: max_isometric_force=5148.767 optimal_fiber_length=0.0714785
        tendon_slack_length=0.1586343 pennation_angle_at_optimal=0.2528673
      PathPoint P1: femur_r (-8.375445e-5 -0.1320724 0.01693932)
      PathPoint P2: femur_r (0.01665563 -0.1828911 0.02388511)
      PathPoint P3: patella_r (0.007214777 0.02962962 0.009876539)
      PathPoint P4: patella_r (0.003502319 0.001730146 0.005134399)
      PathPoint P5: tibia_r (0.0265767 -0.05176495 0.004173539)
      PathWrap: wrap_object=KnExt_at_fem_r method=hybrid
      FiberForceLengthCurve: strain_at_zero_force=0.1999632 strain_at_one_norm_force=0.8928189
          stiffness_at_low_force=0.2 stiffness_at_one_norm_force=2.886604 curviness=0.75
    Millard2012EquilibriumMuscle vasmed_r: max_isometric_force=2747.823 optimal_fiber_length=0.06981357
        tendon_slack_length=0.1441739 pennation_angle_at_optimal=0.4222225
      PathPoint P1: femur_r (0.006854598 -0.1489186 0.006737971)
      PathPoint P2: femur_r (0.02319376 -0.1950722 -0.003166166)
      PathPoint P3: patella_r (0.004412922 0.03117064 -0.01190788)
      PathPoint P4: patella_r (0.003502319 0.001730146 -0.005953942)
      PathPoint P5: tibia_r (0.02605399 -0.05192013 -0.005537494)
      PathWrap: wrap_object=KnExt_at_fem_r method=hybrid
      FiberForceLengthCurve: strain_at_zero_force=0.1999354 strain_at_one_norm_force=0.8518332
          stiffness_at_low_force=0.2 stiffness_at_one_norm_force=3.067965 curviness=0.75
    Millard2012EquilibriumMuscle addbrev_l: max_isometric_force=625.8197 optimal_fiber_length=0.07662578
        tendon_slack_length=0.0263473 pennation_angle_at_optimal=0.1147809
      PathPoint P1: pelvis (-0.01716095 -0.09552997 -0.01310475)
      PathPoint P2: femur_l (-0.007252087 -0.08593851 -0.01151693)
      PathWrap: wrap_object=AB_at_femshaft_l method=hybrid
      FiberForceLengthCurve: strain_at_zero_force=-0.1927643 strain_at_one_norm_force=0.5015522
          stiffness_at_low_force=0.2 stiffness_at_one_norm_force=2.880531 curviness=0.75
    Millard2012EquilibriumMuscle addlong_l: max_isometric_force=916.8 optimal_fiber_length=0.07772025
        tendon_slack_length=0.09467171 pennation_angle_at_optimal=0.1377704
      PathPoint P1: pelvis (-0.006810471 -0.09034696 -0.01606608)
      PathPoint P2: femur_l (0.005084232 -0.1715847 -0.008133288)
      PathWrap: wrap_object=AL_at_femshaft_l method=hybrid
      FiberForceLengthCurve: strain_at_zero_force=-0.1917374 strain_at_one_norm_force=0.5002995
          stiffness_at_low_force=0.2 stiffness_at_one_norm_force=2.890019 curviness=0.75
    Millard2012EquilibriumMuscle addmagDist_l: max_isometric_force=597.2951 optimal_fiber_length=0.1164179
        tendon_slack_length=0.05740786 pennation_angle_at_optimal=0.194705
      PathPoint P1: pelvis (-0.06652339 -0.129748 -0.03388514)
      PathPoint P2: femur_l (0.005549857 -0.1879254 -0.0111134)
      PathWrap: wrap_object=AMdist_at_femshaft_l method=hybrid
      FiberForceLengthCurve: strain_at_zero_force=-3.981963e-9 strain_at_one_norm_force=0.7 stiffness_at_low_force=0.2
          stiffness_at_one_norm_force=2.857143 curviness=0.75
    Millard2012EquilibriumMuscle addmagIsch_l: max_isometric_force=597.2951 optimal_fiber_length=0.1046601
        tendon_slack_length=0.1449582 pennation_angle_at_optimal=0.1680443
      PathPoint P1: pelvis (-0.0805217 -0.131872 -0.03549345)
      PathPoint P2: femur_l (0.00342927 -0.2766017 0.02333472)
      PathWrap: wrap_object=AMisch_at_condyles_l method=hybrid
      FiberForceLengthCurve: strain_at_zero_force=0.007389956 strain_at_one_norm_force=0.7000392
          stiffness_at_low_force=0.2 stiffness_at_one_norm_force=2.887464 curviness=0.75
    Millard2012EquilibriumMuscle addmagMid_l: max_isometric_force=597.2951 optimal_fiber_length=0.09150507
        tendon_slack_length=0.03098526 pennation_angle_at_optimal=0.2073076
      PathPoint P1: pelvis (-0.04731391 -0.1227154 -0.02428633)
      PathPoint P2: femur_l (-0.0029193 -0.1172368 -0.01585734)
      PathWrap: wrap_object=AMmid_at_femshaft_l method=hybrid
      FiberForceLengthCurve: strain_at_zero_force=-3.981963e-9 strain_at_one_norm_force=0.7 stiffness_at_low_force=0.2
          stiffness_at_one_norm_force=2.857143 curviness=0.75
    Millard2012EquilibriumMuscle addmagProx_l: max_isometric_force=597.2951 optimal_fiber_length=0.08056936
        tendon_slack_length=0.03076597 pennation_angle_at_optimal=0.3114833
      PathPoint P1: pelvis (-0.02783488 -0.1093005 -0.01161557)
      PathPoint P2: femur_l (-0.01782935 -0.05792472 -0.01384185)
      PathWrap: wrap_object=AMprox_at_femshaft_l method=hybrid
      FiberForceLengthCurve: strain_at_zero_force=-3.981963e-9 strain_at_one_norm_force=0.7 stiffness_at_low_force=0.2
          stiffness_at_one_norm_force=2.857143 curviness=0.75
    Millard2012EquilibriumMuscle bflh_l: max_isometric_force=1313.184 optimal_fiber_length=0.06837538
        tendon_slack_length=0.2278432 pennation_angle_at_optimal=0.1759182
      PathPoint P1: pelvis (-0.09344182 -0.1210385 -0.04986613)
      PathPoint P2: tibia_l (-0.02851998 -0.02962015 -0.02141114)
      PathPoint P3: tibia_l (-0.02428852 -0.0385062 -0.02564259)
      FiberForceLengthCurve: strain_at_zero_force=0.1965607 strain_at_one_norm_force=0.7068715
          stiffness_at_low_force=0.2 stiffness_at_one_norm_force=3.91918 curviness=0.75
    Millard2012EquilibriumMuscle bfsh_l: max_isometric_force=557.1148 optimal_fiber_length=0.08175697
        tendon_slack_length=0.07843423 pennation_angle_at_optimal=0.2642232
      PathPoint P1: femur_l (-1.876688e-5 -0.1516294 -0.01284443)
      PathPoint P2: tibia_l (-0.02547333 -0.03545955 -0.02691202)
      PathWrap: wrap_object=BF_at_gastroc_l method=hybrid
      FiberForceLengthCurve: strain_at_zero_force=0.115251 strain_at_one_norm_force=0.6888986
          stiffness_at_low_force=0.2 stiffness_at_one_norm_force=3.486462 curviness=0.75
    Millard2012EquilibriumMuscle edl_l: max_isometric_force=603.4982 optimal_fiber_length=0.05430677
        tendon_slack_length=0.2890682 pennation_angle_at_optimal=0.2182582
      PathPoint P1: tibia_l (-0.01354064 -0.09791576 -0.01734895)
      PathPoint P2: tibia_l (0.01250732 -0.3182051 -0.01122604)
      PathPoint P3: calcn_l (0.06225495 0.02438714 -0.0005419365)
      PathPoint P4: calcn_l (0.1094712 0.003725813 -0.008806467)
      PathPoint P5: toes_l (0.0002032262 0.003183877 -0.01036453)
      PathPoint P6: toes_l (0.03000973 -0.0002709682 -0.01693551)
      FiberForceLengthCurve: strain_at_zero_force=0.1317998 strain_at_one_norm_force=0.7072192
          stiffness_at_low_force=0.2 stiffness_at_one_norm_force=3.475726 curviness=0.75
    Millard2012EquilibriumMuscle ehl_l: max_isometric_force=285.8675 optimal_fiber_length=0.05803188
        tendon_slack_length=0.2535367 pennation_angle_at_optimal=0.1972681
      PathPoint P1: tibia_l (-0.0122162 -0.131175 -0.01571561)
      PathPoint P2: tibia_l (0.004125326 -0.2461858 -0.01455027)
      PathPoint P3: tibia_l (0.01709083 -0.3125349 0.0001162126)
      PathPoint P4: calcn_l (0.0657098 0.02635166 0.01429357)
      PathPoint P5: calcn_l (0.08759048 0.0209323 0.01740971)
      PathPoint P6: calcn_l (0.1174647 0.009416146 0.01896778)
      PathPoint P7: toes_l (0.02018713 0.002777424 0.0165968)
      PathPoint P8: toes_l (0.03813878 0.00230323 0.01260002)
      FiberForceLengthCurve: strain_at_zero_force=0.1051406 strain_at_one_norm_force=0.7178208
          stiffness_at_low_force=0.2 stiffness_at_one_norm_force=3.264346 curviness=0.75
    Millard2012EquilibriumMuscle fdl_l: max_isometric_force=423.177 optimal_fiber_length=0.03406583
        tendon_slack_length=0.2893097 pennation_angle_at_optimal=0.2248391
      PathPoint P1: tibia_l (-0.001868778 -0.1550403 0.001617683)
      PathPoint P2: tibia_l (-0.01338069 -0.3084727 0.01236684)
      PathPoint P3: calcn_l (0.02953554 0.02133875 0.01896778)
      PathPoint P4: calcn_l (0.04796138 0.0119226 0.01781616)
      PathPoint P5: calcn_l (0.1123163 -0.005487107 -0.007858079)
      PathPoint P6: toes_l (-0.001287099 -0.00528388 -0.009958082)
      PathPoint P7: toes_l (0.01930649 -0.004809686 -0.01456454)
      PathPoint P8: toes_l (0.02987425 -0.004064523 -0.01639358)
      FiberForceLengthCurve: strain_at_zero_force=-0.01205975 strain_at_one_norm_force=0.6997089
          stiffness_at_low_force=0.2 stiffness_at_one_norm_force=2.809902 curviness=0.75
    Millard2012EquilibriumMuscle fhl_l: max_isometric_force=907.8393 optimal_fiber_length=0.03980021
        tendon_slack_length=0.2676052 pennation_angle_at_optimal=0.2580255
      PathPoint P1: tibia_l (-0.02758229 -0.1830525 -0.01462728)
      PathPoint P2: tibia_l (-0.01945282 -0.3106731 0.009077307)
      PathPoint P3: calcn_l (0.02533553 0.01869681 0.01632584)
      PathPoint P4: calcn_l (0.07031625 0.00460646 0.01734197)
      PathPoint P5: calcn_l (0.1169228 -0.003590329 0.01822261)
      PathPoint P6: toes_l (0.01050002 -0.004335492 0.01795165)
      PathPoint P7: toes_l (0.03807104 -0.00690969 0.01226131)
      FiberForceLengthCurve: strain_at_zero_force=0.01130745 strain_at_one_norm_force=0.7002505
          stiffness_at_low_force=0.2 stiffness_at_one_norm_force=2.902997 curviness=0.75
    Millard2012EquilibriumMuscle gaslat_l: max_isometric_force=1575.059 optimal_fiber_length=0.04938701
        tendon_slack_length=0.315867 pennation_angle_at_optimal=0.2102268
      PathPoint P1: femur_l (-0.002138838 -0.2719176 -0.0197486)
      PathPoint P2: calcn_l (0.00298065 0.02100004 0.003590329)
      PathWrap: wrap_object=GasLat_at_shank_l method=hybrid
      PathWrap pathwrap_0: wrap_object=Gastroc_at_condyles_l method=hybrid
      FiberForceLengthCurve: strain_at_zero_force=-0.05983233 strain_at_one_norm_force=0.7435102
          stiffness_at_low_force=0.2 stiffness_at_one_norm_force=2.489598 curviness=0.75
    Millard2012EquilibriumMuscle gasmed_l: max_isometric_force=3115.515 optimal_fiber_length=0.04277628
        tendon_slack_length=0.3344236 pennation_angle_at_optimal=0.1656816
      PathPoint P1: femur_l (0.005703568 -0.2700639 0.01482928)
      PathPoint P2: calcn_l (0.00298065 0.02100004 0.003590329)
      PathWrap shank: wrap_object=GasMed_at_shank_l method=hybrid
      PathWrap condyles: wrap_object=Gastroc_at_condyles_l method=hybrid
      FiberForceLengthCurve: strain_at_zero_force=0.1998358 strain_at_one_norm_force=0.7902371
          stiffness_at_low_force=0.2 stiffness_at_one_norm_force=3.387526 curviness=0.75
    Millard2012EquilibriumMuscle glmax1_l: max_isometric_force=983.7836 optimal_fiber_length=0.1339307
        tendon_slack_length=0.0444986 pennation_angle_at_optimal=0.3540118
      PathPoint P1: pelvis (-0.1106028 0.03506153 -0.04790892)
      PathPoint P2: pelvis (-0.1129388 -0.02459389 -0.06628961)
      PathPoint P3: femur_l (-0.03661691 -0.02537375 -0.003932824)
      PathPoint P4: femur_l (-0.03028238 -0.04188843 -0.01858935)
      PathWrap: wrap_object=Gmax1_at_pelvis_l method=hybrid
      FiberForceLengthCurve: strain_at_zero_force=-0.07534176 strain_at_one_norm_force=0.8468075
          stiffness_at_low_force=0.2 stiffness_at_one_norm_force=2.168846 curviness=0.75
    Millard2012EquilibriumMuscle glmax2_l: max_isometric_force=1406.046 optimal_fiber_length=0.1349239
        tendon_slack_length=0.0583414 pennation_angle_at_optimal=0.3673821
      PathPoint P1: pelvis (-0.1183297 0.008841603 -0.03931425)
      PathPoint P2: pelvis (-0.1207556 -0.06189122 -0.06918287)
      PathPoint P3: femur_l (-0.03545979 -0.04252723 0.0002329836)
      PathPoint P4: femur_l (-0.01830774 -0.0742462 -0.02239506)
      PathWrap: wrap_object=Gmax2_at_pelvis_l method=hybrid
      FiberForceLengthCurve: strain_at_zero_force=0.199275 strain_at_one_norm_force=0.7164175
          stiffness_at_low_force=0.2 stiffness_at_one_norm_force=3.867406 curviness=0.75
    Millard2012EquilibriumMuscle glmax3_l: max_isometric_force=947.7541 optimal_fiber_length=0.136198
        tendon_slack_length=0.05685784 pennation_angle_at_optimal=0.3824161
      PathPoint P1: pelvis (-0.1168023 -0.0533545 -0.00765862)
      PathPoint P2: pelvis (-0.1143764 -0.1283557 -0.03701666)
      PathPoint P3: femur_l (-0.0256133 -0.08197453 -5.324994e-5)
      PathPoint P4: femur_l (-0.01258492 -0.1030492 -0.02178121)
      PathWrap: wrap_object=Gmax3_at_pelvis_l method=hybrid
      FiberForceLengthCurve: strain_at_zero_force=0.1989714 strain_at_one_norm_force=0.7121937
          stiffness_at_low_force=0.2 stiffness_at_one_norm_force=3.896947 curviness=0.75
    Millard2012EquilibriumMuscle glmed1_l: max_isometric_force=1093.467 optimal_fiber_length=0.07163283
        tendon_slack_length=0.05477147 pennation_angle_at_optimal=0.3165559
      PathPoint P1: pelvis (-0.04402547 0.02642318 -0.09786014)
      PathPoint P2: femur_l (-0.02574876 -0.01743509 -0.03254313)
      FiberForceLengthCurve: strain_at_zero_force=-3.729382e-9 strain_at_one_norm_force=0.7 stiffness_at_low_force=0.2
          stiffness_at_one_norm_force=2.857143 curviness=0.75
    Millard2012EquilibriumMuscle glmed2_l: max_isometric_force=765.0917 optimal_fiber_length=0.08173974
        tendon_slack_length=0.07306056 pennation_angle_at_optimal=0.3165559
      PathPoint P1: pelvis (-0.07637072 0.05589519 -0.06977854)
      PathPoint P2: femur_l (-0.03030947 -0.01150267 -0.02884865)
      FiberForceLengthCurve: strain_at_zero_force=0.06397124 strain_at_one_norm_force=0.7014005
          stiffness_at_low_force=0.2 stiffness_at_one_norm_force=3.137603 curviness=0.75
    Millard2012EquilibriumMuscle glmed3_l: max_isometric_force=871.1993 optimal_fiber_length=0.07441762
        tendon_slack_length=0.04611124 pennation_angle_at_optimal=0.3165559
      PathPoint P1: pelvis (-0.08984791 0.01626042 -0.0544613)
      PathPoint P2: femur_l (-0.03502133 -0.007384695 -0.02391506)
      FiberForceLengthCurve: strain_at_zero_force=0.1252157 strain_at_one_norm_force=0.7030514
          stiffness_at_low_force=0.2 stiffness_at_one_norm_force=3.461191 curviness=0.75
    Millard2012EquilibriumMuscle glmin1_l: max_isometric_force=374.0459 optimal_fiber_length=0.07535732
        tendon_slack_length=0.01788382 pennation_angle_at_optimal=0.1745329
      PathPoint P1: pelvis (-0.02695437 0 -0.100413)
      PathPoint P2: femur_l (-0.01262342 -0.01512515 -0.03642085)
      FiberForceLengthCurve: strain_at_zero_force=-3.729382e-9 strain_at_one_norm_force=0.7 stiffness_at_low_force=0.2
          stiffness_at_one_norm_force=2.857143 curviness=0.75
    Millard2012EquilibriumMuscle glmin2_l: max_isometric_force=394.8197 optimal_fiber_length=0.06548072
        tendon_slack_length=0.03051759 pennation_angle_at_optimal=0
      PathPoint P1: pelvis (-0.05534631 0.01016276 -0.08594673)
      PathPoint P2: femur_l (-0.01228477 -0.01055089 -0.03399255)
      FiberForceLengthCurve: strain_at_zero_force=0.003039474 strain_at_one_norm_force=0.7000285
          stiffness_at_low_force=0.2 stiffness_at_one_norm_force=2.869486 curviness=0.75
    Millard2012EquilibriumMuscle glmin3_l: max_isometric_force=446.7738 optimal_fiber_length=0.03242272
        tendon_slack_length=0.04340591 pennation_angle_at_optimal=0.01745329
      PathPoint P1: pelvis (-0.07089 -0.01575228 -0.06790643)
      PathPoint P2: femur_l (-0.01743082 -0.004779447 -0.03158921)
      FiberForceLengthCurve: strain_at_zero_force=0.007461173 strain_at_one_norm_force=0.7002322
          stiffness_at_low_force=0.2 stiffness_at_one_norm_force=2.886957 curviness=0.75
    Millard2012EquilibriumMuscle grac_l: max_isometric_force=281.3115 optimal_fiber_length=0.1605689
        tendon_slack_length=0.121247 pennation_angle_at_optimal=0.1720016
      PathPoint P1: pelvis (-0.04255197 -0.1314248 -0.02089952)
      PathPoint P2: tibia_l (-0.01558866 -0.04024109 0.02505865)
      PathPoint P3: tibia_l (0.001506396 -0.05891871 0.01331214)
      PathWrap: wrap_object=GR_at_condyles_l method=hybrid
      FiberForceLengthCurve: strain_at_zero_force=-0.1969779 strain_at_one_norm_force=0.8027483
          stiffness_at_low_force=0.2 stiffness_at_one_norm_force=2.000548 curviness=0.75
    Millard2012EquilibriumMuscle iliacus_l: max_isometric_force=1021.141 optimal_fiber_length=0.09347813
        tendon_slack_length=0.08428879 pennation_angle_at_optimal=0.279914
      PathPoint P1: pelvis (-0.05435798 0.03140294 -0.07173574)
      PathPoint P2: pelvis (-0.01212947 -0.05660659 -0.06433241)
      PathPoint P3: femur_l (-0.004344978 -0.04194333 -0.004277319)
      PathPoint P4: femur_l (-0.01278027 -0.04697173 -0.005426945)
      PathWrap: wrap_object=IL_at_brim_l method=hybrid range=(2 3)
      FiberForceLengthCurve: strain_at_zero_force=-0.1703103 strain_at_one_norm_force=0.5005449
          stiffness_at_low_force=0.2 stiffness_at_one_norm_force=2.98127 curviness=0.75
    Millard2012EquilibriumMuscle perbrev_l: max_isometric_force=521.2016 optimal_fiber_length=0.03697839
        tendon_slack_length=0.1201615 pennation_angle_at_optimal=0.2052361
      PathPoint P1: tibia_l (-0.0229827 -0.2142806 -0.01859892)
      PathPoint P2: tibia_l (-0.03121795 -0.3294607 -0.01710437)
      PathPoint P3: tibia_l (-0.02675546 -0.3388545 -0.01821047)
      PathPoint P4: calcn_l (0.03190651 0.01829036 -0.0157839)
      PathPoint P5: calcn_l (0.04586137 0.01483551 -0.02323553)
      FiberForceLengthCurve: strain_at_zero_force=-0.04234068 strain_at_one_norm_force=0.6987541
          stiffness_at_low_force=0.2 stiffness_at_one_norm_force=2.69871 curviness=0.75
    Millard2012EquilibriumMuscle perlong_l: max_isometric_force=1115.371 optimal_fiber_length=0.04042161
        tendon_slack_length=0.2643484 pennation_angle_at_optimal=0.2479525
      PathPoint P1: tibia_l (-0.0171196 -0.1161956 -0.02372659)
      PathPoint P2: tibia_l (-0.02923848 -0.3300531 -0.01634271)
      PathPoint P3: tibia_l (-0.02549703 -0.3397008 -0.01709675)
      PathPoint P4: calcn_l (0.02967102 0.01558067 -0.01497099)
      PathPoint P5: calcn_l (0.04613234 0.007180658 -0.01923874)
      PathPoint P6: calcn_l (0.05771623 0.004674202 -0.007993563)
      PathPoint P7: calcn_l (0.08149369 0.005758075 0.01246454)
      FiberForceLengthCurve: strain_at_zero_force=-0.1323481 strain_at_one_norm_force=0.6924185
          stiffness_at_low_force=0.2 stiffness_at_one_norm_force=2.424929 curviness=0.75
    Millard2012EquilibriumMuscle piri_l: max_isometric_force=1029.787 optimal_fiber_length=0.02331566
        tendon_slack_length=0.1030429 pennation_angle_at_optimal=0.1745329
      PathPoint P1: pelvis (-0.09147415 -0.006636284 -0.01149644)
      PathPoint P2: pelvis (-0.09166284 -0.03115903 -0.05184035)
      PathPoint P3: femur_l (-0.02222894 -0.00600272 -0.02350868)
      FiberForceLengthCurve: strain_at_zero_force=0.09922992 strain_at_one_norm_force=0.7028348
          stiffness_at_low_force=0.2 stiffness_at_one_norm_force=3.313426 curviness=0.75
    Millard2012EquilibriumMuscle psoas_l: max_isometric_force=1426.79 optimal_fiber_length=0.1066989
        tendon_slack_length=0.09085665 pennation_angle_at_optimal=0.2155251
      PathPoint P1: pelvis (-0.05444783 0.06300913 -0.03318735)
      PathPoint P2: pelvis (-0.01841882 -0.06646447 -0.05582283)
      PathPoint P3: femur_l (-0.008434151 -0.03339867 0.00445135)
      PathPoint P4: femur_l (-0.01627442 -0.03845773 0.005089864)
      PathWrap: wrap_object=PS_at_brim_l method=hybrid range=(2 3)
      FiberForceLengthCurve: strain_at_zero_force=-0.09543841 strain_at_one_norm_force=0.5010382
          stiffness_at_low_force=0.2 stiffness_at_one_norm_force=3.353023 curviness=0.75
    Millard2012EquilibriumMuscle recfem_l: max_isometric_force=2191.741 optimal_fiber_length=0.05682147
        tendon_slack_length=0.3357584 pennation_angle_at_optimal=0.2170149
      PathPoint P1: pelvis (-0.0215635 -0.03943152 -0.07939436)
      PathPoint P2: patella_l (0.00712946 0.03493435 -0.0004990622)
      PathPoint P3: patella_l (0.008626646 0.03115574 0.000712946)
      PathPoint P4: patella_l (0.00356473 0.001760977 -2.138838e-5)
      PathPoint P5: tibia_l (0.02758906 -0.05341783 0.0003977563)
      PathWrap: wrap_object=KnExt_at_fem_l method=hybrid
      FiberForceLengthCurve: strain_at_zero_force=0.1999726 strain_at_one_norm_force=0.8999622
          stiffness_at_low_force=0.2 stiffness_at_one_norm_force=2.857186 curviness=0.75
    Millard2012EquilibriumMuscle sart_l: max_isometric_force=249.4131 optimal_fiber_length=0.3116825
        tendon_slack_length=0.09590217 pennation_angle_at_optimal=0.02613542
      PathPoint P1: pelvis (-0.01752034 -0.01585391 -0.08986114)
      PathPoint P2: femur_l (-0.00306082 -0.2546714 0.03100246)
      PathPoint P3: tibia_l (-0.02124188 -0.03393623 0.03088959)
      PathPoint P4: tibia_l (-0.01345601 -0.05069277 0.02234206)
      PathPoint P5: tibia_l (0.01150954 -0.06854949 0.002200354)
      FiberForceLengthCurve: strain_at_zero_force=-0.1984568 strain_at_one_norm_force=0.7212821
          stiffness_at_low_force=0.2 stiffness_at_one_norm_force=2.17453 curviness=0.75
    Millard2012EquilibriumMuscle semimem_l: max_isometric_force=2200.987 optimal_fiber_length=0.04832884
        tendon_slack_length=0.2434555 pennation_angle_at_optimal=0.2545615
      PathPoint P1: pelvis (-0.08867989 -0.1158555 -0.05224881)
      PathPoint P2: tibia_l (-0.02454241 -0.0352903 0.01658729)
      PathWrap: wrap_object=SM_at_condyles_l method=hybrid
      FiberForceLengthCurve: strain_at_zero_force=0.1994426 strain_at_one_norm_force=0.7353994
          stiffness_at_low_force=0.2 stiffness_at_one_norm_force=3.731644 curviness=0.75
    Millard2012EquilibriumMuscle semiten_l: max_isometric_force=591.2951 optimal_fiber_length=0.1370355
        tendon_slack_length=0.1755183 pennation_angle_at_optimal=0.241295
      PathPoint P1: pelvis (-0.09326213 -0.1273394 -0.04382433)
      PathPoint P2: tibia_l (-0.02640425 -0.04299154 0.01938004)
      PathPoint P3: tibia_l (0.001607951 -0.06541822 0.009901594)
      PathWrap: wrap_object=ST_at_condyles_l method=hybrid
      FiberForceLengthCurve: strain_at_zero_force=0.007279189 strain_at_one_norm_force=0.7803276
          stiffness_at_low_force=0.2 stiffness_at_one_norm_force=2.58716 curviness=0.75
    Millard2012EquilibriumMuscle soleus_l: max_isometric_force=6194.843 optimal_fiber_length=0.03687073
        tendon_slack_length=0.2319134 pennation_angle_at_optimal=0.3814289
      PathPoint P1: tibia_l (-0.006431804 -0.07752017 -0.008293643)
      PathPoint P2: calcn_l (0.00298065 0.02100004 0.003590329)
      FiberForceLengthCurve: strain_at_zero_force=0.1569032 strain_at_one_norm_force=0.8506533
          stiffness_at_low_force=0.2 stiffness_at_one_norm_force=2.882882 curviness=0.75
    Millard2012EquilibriumMuscle tfl_l: max_isometric_force=411.2066 optimal_fiber_length=0.07236914
        tendon_slack_length=0.342418 pennation_angle_at_optimal=0.05235988
      PathPoint P1: pelvis (-0.01796958 0.01117904 -0.1097736)
      PathPoint P2: femur_l (0.01217213 -0.0730627 -0.03845274)
      PathPoint P3: femur_l (0.007628522 -0.2887431 -0.02309945)
      PathPoint P4: tibia_l (0.009139933 -0.03469789 -0.02928164)
      FiberForceLengthCurve: strain_at_zero_force=0.07118385 strain_at_one_norm_force=0.7197196
          stiffness_at_low_force=0.2 stiffness_at_one_norm_force=3.08387 curviness=0.75
    Millard2012EquilibriumMuscle tibant_l: max_isometric_force=1227.452 optimal_fiber_length=0.05577475
        tendon_slack_length=0.1963639 pennation_angle_at_optimal=0.1951828
      PathPoint P1: tibia_l (0.01303287 -0.1110333 -0.0137099)
      PathPoint P2: tibia_l (0.02056823 -0.1613029 -0.01206217)
      PathPoint P3: tibia_l (0.02102015 -0.3096575 0.00847221)
      PathPoint P4: calcn_l (0.07898724 0.01205809 0.02066133)
      FiberForceLengthCurve: strain_at_zero_force=0.1892237 strain_at_one_norm_force=0.7076768
          stiffness_at_low_force=0.2 stiffness_at_one_norm_force=3.85763 curviness=0.75
    Millard2012EquilibriumMuscle tibpost_l: max_isometric_force=1730.154 optimal_fiber_length=0.03103365
        tendon_slack_length=0.2305189 pennation_angle_at_optimal=0.2264891
      PathPoint P1: tibia_l (-0.003469789 -0.1103562 -0.008716788)
      PathPoint P2: tibia_l (-0.01180405 -0.309319 0.01651112)
      PathPoint P3: calcn_l (0.02824844 0.02262585 0.01937423)
      PathPoint P4: calcn_l (0.05229687 0.01077099 0.01903552)
      FiberForceLengthCurve: strain_at_zero_force=-0.1916705 strain_at_one_norm_force=0.6862359
          stiffness_at_low_force=0.2 stiffness_at_one_norm_force=2.278147 curviness=0.75
    Millard2012EquilibriumMuscle vasint_l: max_isometric_force=1697.361 optimal_fiber_length=0.07306003
        tendon_slack_length=0.1487766 pennation_angle_at_optimal=0.06309973
      PathPoint P1: femur_l (0.01666654 -0.1384256 -0.01780725)
      PathPoint P2: femur_l (0.0202163 -0.1497258 -0.01639063)
      PathPoint P3: patella_l (0.004135087 0.03422141 0.0004277676)
      PathPoint P4: patella_l (0.00356473 0.001760977 0.0002780489)
      PathPoint P5: tibia_l (0.02756367 -0.05348553 -0.0003639047)
      PathWrap: wrap_object=KnExt_at_fem_l method=hybrid
      FiberForceLengthCurve: strain_at_zero_force=0.1999153 strain_at_one_norm_force=0.8514363
          stiffness_at_low_force=0.2 stiffness_at_one_norm_force=3.06974 curviness=0.75
    Millard2012EquilibriumMuscle vaslat_l: max_isometric_force=5148.767 optimal_fiber_length=0.07300378
        tendon_slack_length=0.1620194 pennation_angle_at_optimal=0.2528673
      PathPoint P1: femur_l (-0.0007569348 -0.133492 -0.02040594)
      PathPoint P2: femur_l (0.0164826 -0.1855727 -0.02627277)
      PathPoint P3: patella_l (0.007343344 0.03015762 -0.01005254)
      PathPoint P4: patella_l (0.00356473 0.001760977 -0.005225894)
      PathPoint P5: tibia_l (0.02753828 -0.05363786 -0.004324542)
      PathWrap: wrap_object=KnExt_at_fem_l method=hybrid
      FiberForceLengthCurve: strain_at_zero_force=0.1999632 strain_at_one_norm_force=0.8928189
          stiffness_at_low_force=0.2 stiffness_at_one_norm_force=2.886604 curviness=0.75
    Millard2012EquilibriumMuscle vasmed_l: max_isometric_force=2747.823 optimal_fiber_length=0.07132716
        tendon_slack_length=0.1472996 pennation_angle_at_optimal=0.4222225
      PathPoint P1: femur_l (0.006400544 -0.1507738 -0.009568448)
      PathPoint P2: femur_l (0.02325844 -0.1980778 0.001631363)
      PathPoint P3: patella_l (0.00449156 0.0317261 0.01212008)
      PathPoint P4: patella_l (0.00356473 0.001760977 0.006060041)
      PathPoint P5: tibia_l (0.02699665 -0.05379866 0.005737847)
      PathWrap: wrap_object=KnExt_at_fem_l method=hybrid
      FiberForceLengthCurve: strain_at_zero_force=0.1999354 strain_at_one_norm_force=0.8518332
          stiffness_at_low_force=0.2 stiffness_at_one_norm_force=3.067965 curviness=0.75
    CoordinateActuator lumbar_ext: coordinate=lumbar_extension optimal_force=10
    CoordinateActuator lumbar_bend: coordinate=lumbar_bending optimal_force=10
    CoordinateActuator lumbar_rot: coordinate=lumbar_rotation optimal_force=10
    ObjectGroup right_leg: members=(addbrev_r addlong_r addmagDist_r addmagIsch_r addmagMid_r addmagProx_r bflh_r bfsh_r edl_r ehl_r fdl_r fhl_r gaslat_r gasmed_r glmax1_r glmax2_r glmax3_r glmed1_r glmed2_r glmed3_r glmin1_r glmin2_r glmin3_r grac_r iliacus_r perbrev_r perlong_r piri_r psoas_r recfem_r sart_r semimem_r semiten_r soleus_r tfl_r tibant_r tibpost_r vasint_r vaslat_r vasmed_r)
    ObjectGroup left_leg: members=(addbrev_l addlong_l addmagDist_l addmagIsch_l addmagMid_l addmagProx_l bflh_l bfsh_l edl_l ehl_l fdl_l fhl_l gaslat_l gasmed_l glmax1_l glmax2_l glmax3_l glmed1_l glmed2_l glmed3_l glmin1_l glmin2_l glmin3_l grac_l iliacus_l perbrev_l perlong_l piri_l psoas_l recfem_l sart_l semimem_l semiten_l soleus_l tfl_l tibant_l tibpost_l vasint_l vaslat_l vasmed_l)
    ObjectGroup hip_add_r: members=(addbrev_r addlong_r addmagDist_r addmagIsch_r addmagMid_r addmagProx_r bflh_r grac_r semimem_r semiten_r)
    ObjectGroup hip_abd_r: members=(glmax1_r glmed1_r glmed2_r glmed3_r glmin1_r glmin2_r glmin3_r piri_r sart_r tfl_r)
    ObjectGroup hip_flex_r: members=(addbrev_r addlong_r glmin1_r grac_r iliacus_r psoas_r recfem_r sart_r tfl_r)
    ObjectGroup hip_ext_r: members=(addlong_r addmagDist_r addmagIsch_r addmagMid_r addmagProx_r bflh_r glmax1_r glmax2_r glmax3_r glmed1_r glmed2_r glmed3_r glmin3_r semimem_r semiten_r)
    ObjectGroup hip_inrot_r: members=(glmed1_r glmed2_r glmed3_r glmin1_r iliacus_r psoas_r tfl_r)
    ObjectGroup hip_exrot_r: members=(glmin3_r piri_r)
    ObjectGroup knee_flex_r: members=(bflh_r bfsh_r gaslat_r gasmed_r grac_r sart_r semimem_r semiten_r)
    ObjectGroup knee_ext_r: members=(recfem_r vasint_r vaslat_r vasmed_r)
    ObjectGroup ankle_df_r: members=(edl_r ehl_r tibant_r)
    ObjectGroup ankle_pf_r: members=(fdl_r fhl_r gaslat_r gasmed_r perbrev_r perlong_r soleus_r tibpost_r)
    ObjectGroup everter_r: members=(edl_r perbrev_r perlong_r)
    ObjectGroup inverter_r: members=(ehl_r fdl_r fhl_r tibant_r tibpost_r)
    ObjectGroup hip_add_l: members=(addbrev_l addlong_l addmagDist_l addmagIsch_l addmagMid_l addmagProx_l bflh_l grac_l semimem_l semiten_l)
    ObjectGroup hip_abd_l: members=(glmax1_l glmed1_l glmed2_l glmed3_l glmin1_l glmin2_l glmin3_l piri_l sart_l tfl_l)
    ObjectGroup hip_flex_l: members=(addbrev_l addlong_l glmin1_l grac_l iliacus_l psoas_l recfem_l sart_l tfl_l)
    ObjectGroup hip_ext_l: members=(addlong_l addmagDist_l addmagIsch_l addmagMid_l addmagProx_l bflh_l glmax1_l glmax2_l glmax3_l glmed1_l glmed2_l glmed3_l glmin3_l semimem_l semiten_l)
    ObjectGroup hip_exrot_l: members=(glmin3_l piri_l)
    ObjectGroup hip_inrot_l: members=(glmed1_l glmed2_l glmed3_l glmin1_l iliacus_l psoas_l tfl_l)
    ObjectGroup knee_flex_l: members=(bflh_l bfsh_l gaslat_l gasmed_l grac_l sart_l semimem_l semiten_l)
    ObjectGroup knee_ext_l: members=(recfem_l vasint_l vaslat_l vasmed_l)
    ObjectGroup ankle_df_l: members=(edl_l ehl_l tibant_l)
    ObjectGroup ankle_pf_l: members=(fdl_l fhl_l gaslat_l gasmed_l perbrev_l perlong_l soleus_l tibpost_l)
    ObjectGroup everter_l: members=(edl_l perbrev_l perlong_l)
    ObjectGroup inverter_l: members=(ehl_l fdl_l fhl_l tibant_l tibpost_l)
  MarkerSet:
    Marker RASI: pelvis (0.01788876 0.001927621 0.1059747)
    Marker LASI: pelvis (0.01836505 0.004635328 -0.1088242)
    Marker SACR: pelvis (-0.1384428 0.01762138 -0.001947045)
    Marker RHJC: femur_r (-0.002169446 0.006430236 -0.003974361) fixed=true
    Marker RT1: femur_r (0.009130704 -0.1158726 0.08098719)
    Marker RT2: femur_r (-0.06288276 -0.1765247 0.06093779)
    Marker RT3: femur_r (0.07071685 -0.2174557 0.08213583)
    Marker RKNM: femur_r (0.004187154 -0.2929051 -0.04932625)
    Marker RS1: tibia_r (0.006150724 -0.08765698 0.06650737)
    Marker RS2: tibia_r (-0.0839115 -0.1689453 0.08879697)
    Marker RS3: tibia_r (0.05231398 -0.1708588 0.04987623)
    Marker RANK: tibia_r (-0.005867611 -0.3243074 0.04064923)
    Marker RANM: tibia_r (-0.01323482 -0.3114035 -0.0310292)
    Marker RHEE: calcn_r (-0.009441093 0.04243101 0.005916166)
    Marker RTOE: toes_r (0.0009051804 0.04900097 -0.01489197)
    Marker RKJC: femur_r (-0.005552505 -0.2886589 0.003499742)
    Marker RAJC: tibia_r (-0.00857748 -0.3144594 0) fixed=true
    Marker RKNE: femur_r (-0.01529216 -0.2844126 0.05632574)
    Marker LTOE: toes_l (0.009071631 0.05444226 0.01681551)
    Marker LAJC: tibia_l (-0.008887823 -0.3258369 0) fixed=true
    Marker LHEE: calcn_l (-0.007881922 0.04636343 -0.008256261)
    Marker LANK: tibia_l (-0.005013107 -0.3309175 -0.0360825)
    Marker LANM: tibia_l (-0.009650168 -0.3318501 0.03178489)
    Marker LS2: tibia_l (-0.08452566 -0.1946825 -0.09147904)
    Marker LS3: tibia_l (0.04920035 -0.1895158 -0.03875721)
    Marker LS1: tibia_l (-0.0007644405 -0.1092745 -0.06378445)
    Marker LKNM: femur_l (-0.001042205 -0.3019538 0.04811862)
    Marker LKJC: femur_l (0 -0.2880302 0) fixed=true
    Marker LKNE: femur_l (-0.01664727 -0.285012 -0.05230415)
    Marker LT1: femur_l (0.02843934 -0.1377334 -0.08049395)
    Marker LT2: femur_l (-0.04696703 -0.2009276 -0.07632519)
    Marker LT3: femur_l (0.08886426 -0.2431248 -0.05431042)
    Marker LHJC: femur_l (-0.002208108 0.006544823 -0.004045184) fixed=true
    Marker CLAV: torso (0.04485637 0.2223403 0.00113061)
    Marker STRN: torso (0.1225969 0.1097941 -0.00332355)
    Marker T10: torso (-0.06109546 0.05258873 -0.003924973)
    Marker RBAK: torso (-0.086995 0.1673315 0.09064239)
    Marker C7: torso (-0.07892875 0.229048 0.002377322)
  ProbeSet:
    Umberger2010MuscleMetabolicsProbe metabolics_Umberger2010: enabled=false probe_operation=value
        initial_conditions_for_integration=0 activation_maintenance_rate_on=true shortening_rate_on=true
        basal_rate_on=false mechanical_work_rate_on=true aerobic_factor=1.5 report_total_metabolics_only=false
      # Aerobic scale factor (S=1.0 for primarily anaerobic conditions and S=1.5 for primarily aerobic conditions. See Umberger et al., (2003).
      Umberger2010MuscleMetabolicsProbe_MetabolicMuscleParameterSet:
        Umberger2010MuscleMetabolicsProbe_MetabolicMuscleParameter addbrev_r: ratio_slow_twitch_fibers=0.49
            use_provided_muscle_mass=false
        Umberger2010MuscleMetabolicsProbe_MetabolicMuscleParameter addlong_r: ratio_slow_twitch_fibers=0.49
            use_provided_muscle_mass=false
        Umberger2010MuscleMetabolicsProbe_MetabolicMuscleParameter addmagDist_r: ratio_slow_twitch_fibers=0.49
            use_provided_muscle_mass=false
        Umberger2010MuscleMetabolicsProbe_MetabolicMuscleParameter addmagIsch_r: ratio_slow_twitch_fibers=0.49
            use_provided_muscle_mass=false
        Umberger2010MuscleMetabolicsProbe_MetabolicMuscleParameter addmagMid_r: ratio_slow_twitch_fibers=0.49
            use_provided_muscle_mass=false
        Umberger2010MuscleMetabolicsProbe_MetabolicMuscleParameter addmagProx_r: ratio_slow_twitch_fibers=0.49
            use_provided_muscle_mass=false
        Umberger2010MuscleMetabolicsProbe_MetabolicMuscleParameter bflh_r: ratio_slow_twitch_fibers=0.49
            use_provided_muscle_mass=false
        Umberger2010MuscleMetabolicsProbe_MetabolicMuscleParameter bfsh_r: ratio_slow_twitch_fibers=0.53
            use_provided_muscle_mass=false
        Umberger2010MuscleMetabolicsProbe_MetabolicMuscleParameter edl_r: ratio_slow_twitch_fibers=0.49
            use_provided_muscle_mass=false
        Umberger2010MuscleMetabolicsProbe_MetabolicMuscleParameter fdl_r: ratio_slow_twitch_fibers=0.49
            use_provided_muscle_mass=false
        Umberger2010MuscleMetabolicsProbe_MetabolicMuscleParameter fhl_r: ratio_slow_twitch_fibers=0.49
            use_provided_muscle_mass=false
        Umberger2010MuscleMetabolicsProbe_MetabolicMuscleParameter gaslat_r: ratio_slow_twitch_fibers=0.54
            use_provided_muscle_mass=false
        Umberger2010MuscleMetabolicsProbe_MetabolicMuscleParameter gasmed_r: ratio_slow_twitch_fibers=0.54
            use_provided_muscle_mass=false
        Umberger2010MuscleMetabolicsProbe_MetabolicMuscleParameter glmax1_r: ratio_slow_twitch_fibers=0.55
            use_provided_muscle_mass=false
        Umberger2010MuscleMetabolicsProbe_MetabolicMuscleParameter glmax2_r: ratio_slow_twitch_fibers=0.55
            use_provided_muscle_mass=false
        Umberger2010MuscleMetabolicsProbe_MetabolicMuscleParameter glmax3_r: ratio_slow_twitch_fibers=0.55
            use_provided_muscle_mass=false
        Umberger2010MuscleMetabolicsProbe_MetabolicMuscleParameter glmed1_r: ratio_slow_twitch_fibers=0.49
            use_provided_muscle_mass=false
        Umberger2010MuscleMetabolicsProbe_MetabolicMuscleParameter glmed2_r: ratio_slow_twitch_fibers=0.49
            use_provided_muscle_mass=false
        Umberger2010MuscleMetabolicsProbe_MetabolicMuscleParameter glmed3_r: ratio_slow_twitch_fibers=0.49
            use_provided_muscle_mass=false
        Umberger2010MuscleMetabolicsProbe_MetabolicMuscleParameter glmin1_r: ratio_slow_twitch_fibers=0.49
            use_provided_muscle_mass=false
        Umberger2010MuscleMetabolicsProbe_MetabolicMuscleParameter glmin2_r: ratio_slow_twitch_fibers=0.49
            use_provided_muscle_mass=false
        Umberger2010MuscleMetabolicsProbe_MetabolicMuscleParameter glmin3_r: ratio_slow_twitch_fibers=0.49
            use_provided_muscle_mass=false
        Umberger2010MuscleMetabolicsProbe_MetabolicMuscleParameter grac_r: ratio_slow_twitch_fibers=0.49
            use_provided_muscle_mass=false
        Umberger2010MuscleMetabolicsProbe_MetabolicMuscleParameter iliacus_r: ratio_slow_twitch_fibers=0.5
            use_provided_muscle_mass=false
        Umberger2010MuscleMetabolicsProbe_MetabolicMuscleParameter perbrev_r: ratio_slow_twitch_fibers=0.49
            use_provided_muscle_mass=false
        Umberger2010MuscleMetabolicsProbe_MetabolicMuscleParameter perlong_r: ratio_slow_twitch_fibers=0.49
            use_provided_muscle_mass=false
        Umberger2010MuscleMetabolicsProbe_MetabolicMuscleParameter piri_r: ratio_slow_twitch_fibers=0.49
            use_provided_muscle_mass=false
        Umberger2010MuscleMetabolicsProbe_MetabolicMuscleParameter psoas_r: ratio_slow_twitch_fibers=0.5
            use_provided_muscle_mass=false
        Umberger2010MuscleMetabolicsProbe_MetabolicMuscleParameter recfem_r: ratio_slow_twitch_fibers=0.39
            use_provided_muscle_mass=false
        Umberger2010MuscleMetabolicsProbe_MetabolicMuscleParameter sart_r: ratio_slow_twitch_fibers=0.49
            use_provided_muscle_mass=false
        Umberger2010MuscleMetabolicsProbe_MetabolicMuscleParameter semimem_r: ratio_slow_twitch_fibers=0.49
            use_provided_muscle_mass=false
        Umberger2010MuscleMetabolicsProbe_MetabolicMuscleParameter semiten_r: ratio_slow_twitch_fibers=0.49
            use_provided_muscle_mass=false
        Umberger2010MuscleMetabolicsProbe_MetabolicMuscleParameter soleus_r: ratio_slow_twitch_fibers=0.8
            use_provided_muscle_mass=false
        Umberger2010MuscleMetabolicsProbe_MetabolicMuscleParameter tfl_r: ratio_slow_twitch_fibers=0.49
            use_provided_muscle_mass=false
        Umberger2010MuscleMetabolicsProbe_MetabolicMuscleParameter tibant_r: ratio_slow_twitch_fibers=0.7
            use_provided_muscle_mass=false
        Umberger2010MuscleMetabolicsProbe_MetabolicMuscleParameter tibpost_r: ratio_slow_twitch_fibers=0.49
            use_provided_muscle_mass=false
        Umberger2010MuscleMetabolicsProbe_MetabolicMuscleParameter vasint_r: ratio_slow_twitch_fibers=0.5
            use_provided_muscle_mass=false
        Umberger2010MuscleMetabolicsProbe_MetabolicMuscleParameter vaslat_r: ratio_slow_twitch_fibers=0.5
            use_provided_muscle_mass=false
        Umberger2010MuscleMetabolicsProbe_MetabolicMuscleParameter vasmed_r: ratio_slow_twitch_fibers=0.5
            use_provided_muscle_mass=false
        Umberger2010MuscleMetabolicsProbe_MetabolicMuscleParameter addbrev_l: ratio_slow_twitch_fibers=0.49
            use_provided_muscle_mass=false
        Umberger2010MuscleMetabolicsProbe_MetabolicMuscleParameter addlong_l: ratio_slow_twitch_fibers=0.49
            use_provided_muscle_mass=false
        Umberger2010MuscleMetabolicsProbe_MetabolicMuscleParameter addmagDist_l: ratio_slow_twitch_fibers=0.49
            use_provided_muscle_mass=false
        Umberger2010MuscleMetabolicsProbe_MetabolicMuscleParameter addmagIsch_l: ratio_slow_twitch_fibers=0.49
            use_provided_muscle_mass=false
        Umberger2010MuscleMetabolicsProbe_MetabolicMuscleParameter addmagMid_l: ratio_slow_twitch_fibers=0.49
            use_provided_muscle_mass=false
        Umberger2010MuscleMetabolicsProbe_MetabolicMuscleParameter addmagProx_l: ratio_slow_twitch_fibers=0.49
            use_provided_muscle_mass=false
        Umberger2010MuscleMetabolicsProbe_MetabolicMuscleParameter bflh_l: ratio_slow_twitch_fibers=0.49
            use_provided_muscle_mass=false
        Umberger2010MuscleMetabolicsProbe_MetabolicMuscleParameter bfsh_l: ratio_slow_twitch_fibers=0.53
            use_provided_muscle_mass=false
        Umberger2010MuscleMetabolicsProbe_MetabolicMuscleParameter edl_l: ratio_slow_twitch_fibers=0.49
            use_provided_muscle_mass=false
        Umberger2010MuscleMetabolicsProbe_MetabolicMuscleParameter fdl_l: ratio_slow_twitch_fibers=0.49
            use_provided_muscle_mass=false
        Umberger2010MuscleMetabolicsProbe_MetabolicMuscleParameter fhl_l: ratio_slow_twitch_fibers=0.49
            use_provided_muscle_mass=false
        Umberger2010MuscleMetabolicsProbe_MetabolicMuscleParameter gaslat_l: ratio_slow_twitch_fibers=0.54
            use_provided_muscle_mass=false
        Umberger2010MuscleMetabolicsProbe_MetabolicMuscleParameter gasmed_l: ratio_slow_twitch_fibers=0.54
            use_provided_muscle_mass=false
        Umberger2010MuscleMetabolicsProbe_MetabolicMuscleParameter glmax1_l: ratio_slow_twitch_fibers=0.55
            use_provided_muscle_mass=false
        Umberger2010MuscleMetabolicsProbe_MetabolicMuscleParameter glmax2_l: ratio_slow_twitch_fibers=0.55
            use_provided_muscle_mass=false
        Umberger2010MuscleMetabolicsProbe_MetabolicMuscleParameter glmax3_l: ratio_slow_twitch_fibers=0.55
            use_provided_muscle_mass=false
        Umberger2010MuscleMetabolicsProbe_MetabolicMuscleParameter glmed1_l: ratio_slow_twitch_fibers=0.49
            use_provided_muscle_mass=false
        Umberger2010MuscleMetabolicsProbe_MetabolicMuscleParameter glmed2_l: ratio_slow_twitch_fibers=0.49
            use_provided_muscle_mass=false
        Umberger2010MuscleMetabolicsProbe_MetabolicMuscleParameter glmed3_l: ratio_slow_twitch_fibers=0.49
            use_provided_muscle_mass=false
        Umberger2010MuscleMetabolicsProbe_MetabolicMuscleParameter glmin1_l: ratio_slow_twitch_fibers=0.49
            use_provided_muscle_mass=false
        Umberger2010MuscleMetabolicsProbe_MetabolicMuscleParameter glmin2_l: ratio_slow_twitch_fibers=0.49
            use_provided_muscle_mass=false
        Umberger2010MuscleMetabolicsProbe_MetabolicMuscleParameter glmin3_l: ratio_slow_twitch_fibers=0.49
            use_provided_muscle_mass=false
        Umberger2010MuscleMetabolicsProbe_MetabolicMuscleParameter grac_l: ratio_slow_twitch_fibers=0.49
            use_provided_muscle_mass=false
        Umberger2010MuscleMetabolicsProbe_MetabolicMuscleParameter iliacus_l: ratio_slow_twitch_fibers=0.5
            use_provided_muscle_mass=false
        Umberger2010MuscleMetabolicsProbe_MetabolicMuscleParameter perbrev_l: ratio_slow_twitch_fibers=0.49
            use_provided_muscle_mass=false
        Umberger2010MuscleMetabolicsProbe_MetabolicMuscleParameter perlong_l: ratio_slow_twitch_fibers=0.49
            use_provided_muscle_mass=false
        Umberger2010MuscleMetabolicsProbe_MetabolicMuscleParameter piri_l: ratio_slow_twitch_fibers=0.49
            use_provided_muscle_mass=false
        Umberger2010MuscleMetabolicsProbe_MetabolicMuscleParameter psoas_l: ratio_slow_twitch_fibers=0.5
            use_provided_muscle_mass=false
        Umberger2010MuscleMetabolicsProbe_MetabolicMuscleParameter recfem_l: ratio_slow_twitch_fibers=0.39
            use_provided_muscle_mass=false
        Umberger2010MuscleMetabolicsProbe_MetabolicMuscleParameter sart_l: ratio_slow_twitch_fibers=0.49
            use_provided_muscle_mass=false
        Umberger2010MuscleMetabolicsProbe_MetabolicMuscleParameter semimem_l: ratio_slow_twitch_fibers=0.49
            use_provided_muscle_mass=false
        Umberger2010MuscleMetabolicsProbe_MetabolicMuscleParameter semiten_l: ratio_slow_twitch_fibers=0.49
            use_provided_muscle_mass=false
        Umberger2010MuscleMetabolicsProbe_MetabolicMuscleParameter soleus_l: ratio_slow_twitch_fibers=0.8
            use_provided_muscle_mass=false
        Umberger2010MuscleMetabolicsProbe_MetabolicMuscleParameter tfl_l: ratio_slow_twitch_fibers=0.49
            use_provided_muscle_mass=false
        Umberger2010MuscleMetabolicsProbe_MetabolicMuscleParameter tibant_l: ratio_slow_twitch_fibers=0.7
            use_provided_muscle_mass=false
        Umberger2010MuscleMetabolicsProbe_MetabolicMuscleParameter tibpost_l: ratio_slow_twitch_fibers=0.49
            use_provided_muscle_mass=false
        Umberger2010MuscleMetabolicsProbe_MetabolicMuscleParameter vasint_l: ratio_slow_twitch_fibers=0.5
            use_provided_muscle_mass=false
        Umberger2010MuscleMetabolicsProbe_MetabolicMuscleParameter vaslat_l: ratio_slow_twitch_fibers=0.5
            use_provided_muscle_mass=false
        Umberger2010MuscleMetabolicsProbe_MetabolicMuscleParameter vasmed_l: ratio_slow_twitch_fibers=0.5
            use_provided_muscle_mass=false
