# OpenSim document version 40000
CMCTool:
  model_file: ..\FINAL_PERSONALISEDTORSIONS_scaled.osim
  replace_force_set: false
  force_set_files: actuators_so.xml
  results_directory: .\CMC
  output_precision: 8
  initial_time: 1.665
  final_time: 2.435
  solve_for_equilibrium_for_auxiliary_states: true
  maximum_number_of_integrator_steps: 20000
  maximum_integrator_step_size: 1
  minimum_integrator_step_size: 1e-8
  integrator_error_tolerance: 1e-5
  external_loads_file: GRF.xml
  desired_kinematics_file: .\RRA\_Kinematics_q.sto
  task_set_file: tasks.xml
  lowpass_cutoff_frequency: -1
  cmc_time_window: 0.01
  use_fast_optimization_target: true
  optimizer_algorithm: ipopt
  numerical_derivative_step_size: 1e-5
  optimization_convergence_tolerance: 1e-5
  optimizer_max_iterations: 1000
  optimizer_print_level: 0
  use_verbose_printing: false
  AnalysisSet Analyses:
    ProbeReporter MetabolicsReporter
