# OpenSim document version 40000
InverseKinematicsTool:
  results_directory: C:\Git\research_data\Projects\torsion_deformities_healthy_kinematics\simulations\TD01\pre\dynamic_12_l
  time_range: 0.07 1.025
  output_motion_file: .\ik.mot
  marker_file: .\marker_experimental.trc
  report_marker_locations: true
  IKTaskSet:
    IKMarkerTask STRN: apply=true weight=1
    IKMarkerTask C7: apply=true weight=1
    IKMarkerTask T10: apply=true weight=1
    IKMarkerTask CLAV: apply=true weight=1
    IKMarkerTask RBAK: apply=false weight=1
    IKMarkerTask RASI: apply=true weight=10
    IKMarkerTask LASI: apply=true weight=10
    IKMarkerTask SACR: apply=true weight=10
    IKMarkerTask LT1: apply=true weight=8
    IKMarkerTask LT3: apply=true weight=8
    IKMarkerTask LT2: apply=true weight=8
    IKMarkerTask LKNE: apply=true weight=5
    IKMarkerTask LKNM: apply=false weight=5
    IKMarkerTask LS1: apply=true weight=8
    IKMarkerTask LS3: apply=true weight=8
    IKMarkerTask LS2: apply=true weight=8
    IKMarkerTask LANK: apply=true weight=5
    IKMarkerTask LANM: apply=false weight=5
    IKMarkerTask LHEE: apply=true weight=10
    IKMarkerTask LTOE: apply=true weight=10
    IKMarkerTask LKJC: apply=false weight=1
    IKMarkerTask LAJC: apply=false weight=1
    IKMarkerTask RT1: apply=true weight=8
    IKMarkerTask RT3: apply=true weight=8
    IKMarkerTask RT2: apply=true weight=8
    IKMarkerTask RKNE: apply=true weight=5
    IKMarkerTask RKNM: apply=false weight=5
    IKMarkerTask RS1: apply=true weight=8
    IKMarkerTask RS3: apply=true weight=8
    IKMarkerTask RS2: apply=true weight=8
    IKMarkerTask RANK: apply=true weight=10
    IKMarkerTask RANM: apply=false weight=10
    IKMarkerTask RHEE: apply=true weight=10
    IKMarkerTask RTOE: apply=true weight=10
    IKMarkerTask RKJC: apply=false weight=1
    IKMarkerTask RAJC: apply=false weight=1
