# OpenSim document version 20302
MarkerSet gait2392_Scale:
  Marker Sternum: torso (0.07 0.3 0) fixed=true
  Marker R.Acromium: torso (-0.03 0.44 0.15) fixed=true
  Marker L.Acromium: torso (-0.03 0.44 -0.15) fixed=true
  Marker Top.Head: torso (0.00084 0.657 0) fixed=true
  Marker R.ASIS: pelvis (0.02 0.03 0.128) fixed=true
  Marker L.ASIS: pelvis (0.02 0.03 -0.128) fixed=true
  Marker V.Sacral: pelvis (-0.16 0.04 0) fixed=true
  Marker R.Thigh.Upper: femur_r (0.018 -0.2 0.064) fixed=true
  Marker R.Thigh.Front: femur_r (0.08 -0.25 0.0047) fixed=true
  Marker R.Thigh.Rear: femur_r (0.01 -0.3 0.06) fixed=true
  Marker R.Knee.Lat: femur_r (0 -0.404 0.05) fixed=true
  Marker R.Knee.Med: femur_r (0 -0.404 -0.05) fixed=true
  Marker R.Shank.Upper: tibia_r (0.005 -0.065 0.05) fixed=true
  Marker R.Shank.Front: tibia_r (0.05 -0.08 0) fixed=true
  Marker R.Shank.Rear: tibia_r (0.02 -0.13 0.05) fixed=true
  Marker R.Ankle.Lat: tibia_r (-0.005 -0.41 0.053) fixed=true
  Marker R.Ankle.Med: tibia_r (0.006 -0.3888 -0.038) fixed=true
  Marker R.Heel: calcn_r (-0.02 0.02 0) fixed=true
  Marker R.Midfoot.Sup: calcn_r (0.13 0.03 -0.03) fixed=true
  Marker R.Midfoot.Lat: calcn_r (0.1 0.02 0.04) fixed=true
  Marker R.Toe.Lat: calcn_r (0.19 0 0.065) fixed=true
  Marker R.Toe.Med: calcn_r (0.19 0.005 -0.04) fixed=true
  Marker R.Toe.Tip: calcn_r (0.26 0.005 0) fixed=true
  Marker L.Thigh.Upper: femur_l (0.018 -0.2 -0.064) fixed=true
  Marker L.Thigh.Front: femur_l (0.08 -0.25 -0.0047) fixed=true
  Marker L.Thigh.Rear: femur_l (0.01 -0.3 -0.06) fixed=true
  Marker L.Knee.Lat: femur_l (0 -0.404 -0.05) fixed=true
  Marker L.Knee.Med: femur_l (0 -0.404 0.05) fixed=true
  Marker L.Shank.Upper: tibia_l (0.005 -0.065 -0.05) fixed=true
  Marker L.Shank.Front: tibia_l (0.05 -0.08 0) fixed=true
  Marker L.Shank.Rear: tibia_l (-0.02 -0.13 -0.05) fixed=true
  Marker L.Ankle.Lat: tibia_l (-0.005 -0.41 -0.053) fixed=true
  Marker L.Ankle.Med: tibia_l (0.006 -0.3888 0.038) fixed=true
  Marker L.Heel: calcn_l (-0.02 0.02 0) fixed=true
  Marker L.Midfoot.Sup: calcn_l (0.13 0.03 0.03) fixed=true
  Marker L.Midfoot.Lat: calcn_l (0.1 0.02 -0.04) fixed=true
  Marker L.Toe.Lat: calcn_l (0.19 0 -0.065) fixed=true
  Marker L.Toe.Med: calcn_l (0.19 0.005 0.04) fixed=true
  Marker L.Toe.Tip: calcn_l (0.26 0.005 0) fixed=true
