# OpenSim document version 30000
ForceSet LowerBody_RRA:
  defaults: CoordinateActuator default: optimal_force=100
  PointActuator FX: body=pelvis point=(-0.069901 0 0) direction=(1 0 0) optimal_force=500
  PointActuator FY: body=pelvis point=(-0.069901 0 0) direction=(0 1 0) optimal_force=500
  PointActuator FZ: body=pelvis point=(-0.069901 0 0) direction=(0 0 1) optimal_force=500
  TorqueActuator MX: bodyA=pelvis bodyB=ground axis=(1 0 0) optimal_force=500 direction=(1 0 0)
  TorqueActuator MY: bodyA=pelvis bodyB=ground axis=(0 1 0) optimal_force=500 direction=(0 1 0)
  TorqueActuator MZ: bodyA=pelvis bodyB=ground axis=(0 0 1) optimal_force=500 direction=(0 0 1)
  CoordinateActuator hip_flexion_r_reserve: coordinate=hip_flexion_r optimal_force=150 min_control=-1 max_control=1
  CoordinateActuator hip_adduction_r_reserve: coordinate=hip_adduction_r optimal_force=150 min_control=-1 max_control=1
  CoordinateActuator hip_rotation_r_reserve: coordinate=hip_rotation_r optimal_force=150 min_control=-1 max_control=1
  CoordinateActuator knee_angle_r_reserve: coordinate=knee_angle_r optimal_force=150 min_control=-1 max_control=1
  CoordinateActuator ankle_angle_r_reserve: coordinate=ankle_angle_r optimal_force=150 min_control=-1 max_control=1
  CoordinateActuator hip_flexion_l_reserve: coordinate=hip_flexion_l optimal_force=150 min_control=-1 max_control=1
  CoordinateActuator hip_adduction_l_reserve: coordinate=hip_adduction_l optimal_force=150 min_control=-1 max_control=1
  CoordinateActuator hip_rotation_l_reserve: coordinate=hip_rotation_l optimal_force=150 min_control=-1 max_control=1
  CoordinateActuator knee_angle_l_reserve: coordinate=knee_angle_l optimal_force=150 min_control=-1 max_control=1
  CoordinateActuator ankle_angle_l_reserve: coordinate=ankle_angle_l optimal_force=150 min_control=-1 max_control=1
  CoordinateActuator lumbar_extension_reserve: coordinate=lumbar_extension optimal_force=500 min_control=-1
      max_control=1
  CoordinateActuator lumbar_bending_reserve: coordinate=lumbar_bending optimal_force=500 min_control=-1 max_control=1
  CoordinateActuator lumbar_rotation_reserve: coordinate=lumbar_rotation optimal_force=500 min_control=-1 max_control=1
  CoordinateActuator arm_flex_r: coordinate=arm_flex_r optimal_force=500 min_control=-1 max_control=1
  CoordinateActuator arm_add_r: coordinate=arm_add_r optimal_force=500 min_control=-1 max_control=1
  CoordinateActuator arm_rot_r: coordinate=arm_rot_r optimal_force=500 min_control=-1 max_control=1
  CoordinateActuator elbow_flex_r: coordinate=elbow_flex_r optimal_force=500 min_control=-1 max_control=1
  CoordinateActuator pro_sup_r: coordinate=pro_sup_r optimal_force=100 min_control=-1 max_control=1
  CoordinateActuator arm_flex_l: coordinate=arm_flex_l optimal_force=500 min_control=-1 max_control=1
  CoordinateActuator arm_add_l: coordinate=arm_add_l optimal_force=500 min_control=-1 max_control=1
  CoordinateActuator arm_rot_l: coordinate=arm_rot_l optimal_force=500 min_control=-1 max_control=1
  CoordinateActuator elbow_flex_l: coordinate=elbow_flex_l optimal_force=500 min_control=-1 max_control=1
  CoordinateActuator pro_sup_l: coordinate=pro_sup_l optimal_force=100 min_control=-1 max_control=1
