# OpenSim document version 40500
ControlSet 009:
  ControlLinear [values shared by the 29 below unless stated]: is_model_control=true extrapolate=true filter_on=false
      use_steps=false kp=100 kv=20 default_min=-1 default_max=1
  ControlLinear FX.excitation: default_min=-10000 default_max=10000
    x_nodes: ControlLinearNode: t=4.925 value=10000
  ControlLinear FY.excitation: default_min=-10000 default_max=10000
    x_nodes: ControlLinearNode: t=4.925 value=-10000
  ControlLinear FZ.excitation: default_min=-10000 default_max=10000
    x_nodes: ControlLinearNode: t=4.925 value=10000
  ControlLinear MX.excitation: default_min=-10000 default_max=10000
    x_nodes: ControlLinearNode: t=4.925 value=-10000
  ControlLinear MY.excitation: default_min=-10000 default_max=10000
    x_nodes: ControlLinearNode: t=4.925 value=-10000
  ControlLinear MZ.excitation: default_min=-10000 default_max=10000
    x_nodes: ControlLinearNode: t=4.925 value=-10000
  ControlLinear hip_flexion_r.excitation:
    x_nodes: ControlLinearNode: t=4.925 value=1
  ControlLinear hip_adduction_r.excitation:
    x_nodes: ControlLinearNode: t=4.925 value=-1
  ControlLinear hip_rotation_r.excitation:
    x_nodes: ControlLinearNode: t=4.925 value=-1
  ControlLinear knee_angle_r.excitation:
    x_nodes: ControlLinearNode: t=4.925 value=-1
  ControlLinear ankle_angle_r.excitation:
    x_nodes: ControlLinearNode: t=4.925 value=1
  ControlLinear hip_flexion_l.excitation:
    x_nodes: ControlLinearNode: t=4.925 value=1
  ControlLinear hip_adduction_l.excitation:
    x_nodes: ControlLinearNode: t=4.925 value=1
  ControlLinear hip_rotation_l.excitation:
    x_nodes: ControlLinearNode: t=4.925 value=-1
  ControlLinear knee_angle_l.excitation:
    x_nodes: ControlLinearNode: t=4.925 value=1
  ControlLinear ankle_angle_l.excitation:
    x_nodes: ControlLinearNode: t=4.925 value=1
  ControlLinear lumbar_extension.excitation:
    x_nodes: ControlLinearNode: t=4.925 value=1
  ControlLinear lumbar_bending.excitation:
    x_nodes: ControlLinearNode: t=4.925 value=-1
  ControlLinear lumbar_rotation.excitation:
    x_nodes: ControlLinearNode: t=4.925 value=1
  ControlLinear arm_flex_r.excitation:
    x_nodes: ControlLinearNode: t=4.925 value=-1
  ControlLinear arm_add_r.excitation:
    x_nodes: ControlLinearNode: t=4.925 value=1
  ControlLinear arm_rot_r.excitation:
    x_nodes: ControlLinearNode: t=4.925 value=1
  ControlLinear elbow_flex_r.excitation:
    x_nodes: ControlLinearNode: t=4.925 value=-1
  ControlLinear pro_sup_r.excitation:
    x_nodes: ControlLinearNode: t=4.925 value=1
  ControlLinear arm_flex_l.excitation:
    x_nodes: ControlLinearNode: t=4.925 value=1
  ControlLinear arm_add_l.excitation:
    x_nodes: ControlLinearNode: t=4.925 value=1
  ControlLinear arm_rot_l.excitation:
    x_nodes: ControlLinearNode: t=4.925 value=-1
  ControlLinear elbow_flex_l.excitation:
    x_nodes: ControlLinearNode: t=4.925 value=-1
  ControlLinear pro_sup_l.excitation:
    x_nodes: ControlLinearNode: t=4.925 value=1
