# OpenSim document version 40500
AnalyzeTool:
  model_file: ../../../../../../../../research_data/models/1_FAIS/009/009_Rajagopal2015_FAI_v4.osim
  replace_force_set: false
  results_directory: ../../muscleAnalysis
  output_precision: 8
  initial_time: 0
  final_time: 0.495
  solve_for_equilibrium_for_auxiliary_states: false
  maximum_number_of_integrator_steps: 20000
  maximum_integrator_step_size: 1
  minimum_integrator_step_size: 1e-8
  integrator_error_tolerance: 1e-5
  external_loads_file: ../../grf.xml
  coordinates_file: ../../ik.mot
  lowpass_cutoff_frequency_for_coordinates: -1
  AnalysisSet Analyses:
    MuscleAnalysis: start_time=0 end_time=0.495 step_interval=1 in_degrees=true muscle_list=all
        moment_arm_coordinate_list=all compute_moments=true
