# OpenSim document version 30000
AnalyzeTool:
  model_file: ..\..\..\009_Rajagopal2015_FAI_rra_opt_N10_hans.osim
  replace_force_set: false
  results_directory: .\
  output_precision: 8
  initial_time: 4.925
  final_time: 5.409
  solve_for_equilibrium_for_auxiliary_states: false
  maximum_number_of_integrator_steps: 20000
  maximum_integrator_step_size: 1
  minimum_integrator_step_size: 1e-8
  integrator_error_tolerance: 1e-5
  external_loads_file: ..\..\..\inverseDynamics\Run_baseline1\grf.xml
  coordinates_file: ..\..\..\inverseKinematics\Run_baseline1\IK.mot
  lowpass_cutoff_frequency_for_coordinates: -1
  AnalysisSet Analyses:
    MuscleAnalysis: start_time=1.383333 end_time=2.6 step_interval=1 in_degrees=true muscle_list=all
        moment_arm_coordinate_list=all compute_moments=true
