# OpenSim document version 40500
AnalyzeTool Visual3d:
  model_file: RRA_adjusted_model_trial3_left.osim
  replace_force_set: false
  force_set_files: ../../../../SO_Actuators.xml
  results_directory: SO Results (left)
  output_precision: 8
  initial_time: 1.13
  final_time: 1.44
  solve_for_equilibrium_for_auxiliary_states: false
  maximum_number_of_integrator_steps: 20000
  maximum_integrator_step_size: 1
  minimum_integrator_step_size: 1e-8
  integrator_error_tolerance: 1e-5
  external_loads_file: GRF_Setup_trial3_left.xml
  coordinates_file: Visual3d_SIMM_input_trial3_left.mot
  lowpass_cutoff_frequency_for_coordinates: 6
  AnalysisSet Analyses:
    StaticOptimization: start_time=1.13 end_time=1.44 step_interval=1 in_degrees=true use_model_force_set=true
        activation_exponent=2 use_muscle_physiology=true optimizer_convergence_criterion=0.0001
        optimizer_max_iterations=100
