# OpenSim document version 40500
AnalyzeTool PC013:
  replace_force_set: false
  force_set_files: ../../../../SO_Actuators.xml
  results_directory: Results of SO and MA (right)
  output_precision: 8
  initial_time: 1.49
  final_time: 1.97
  solve_for_equilibrium_for_auxiliary_states: false
  maximum_number_of_integrator_steps: 20000
  maximum_integrator_step_size: 1
  minimum_integrator_step_size: 1e-8
  integrator_error_tolerance: 1e-5
  external_loads_file: GRF_Setup_trial3_right.xml
  coordinates_file: Visual3d_SIMM_input_trial3_right.mot
  lowpass_cutoff_frequency_for_coordinates: 6
  AnalysisSet Analyses:
    StaticOptimization: start_time=1.49 end_time=1.97 step_interval=1 in_degrees=true use_model_force_set=true
        activation_exponent=2 use_muscle_physiology=true optimizer_convergence_criterion=0.0001
        optimizer_max_iterations=100
    MuscleAnalysis: start_time=1.49 end_time=1.97 step_interval=1 in_degrees=true muscle_list=all
        moment_arm_coordinate_list=all compute_moments=true
